# Подключение библиотеки
# [reference: rfp2mcd(c) Release [mcd14].xmcd]
# Инициализация путей к файлу свойств рабочих веществ
hfld1 := "C:\Rfp8\fluids\NITROGEN.FLD"
# Объединение путей
hfld := hfld1
# Число компонентов
i := 1
# Инициализация библиотеки
ierr_SETUP(i, hfld, hfm, hrf) = 0
# При изменении любого параметры в блоке выше следуют нажимать Ctrl+F9!
