# СОДЕРЖАНИЕ
# 1. Подключение рабочей смеси
# 2. Исходные данные
# 3. Формулы, зависимости и варианты расчета
# 3.1. Варианты расчета параметров ввода смеси в колонну
# 3.1.1. Задана температура вводимой в колонну смеси
# 3.1.2. Задан фазовый состав питающего потока
# 3.2. Перевод массовых, мольных и объемных расходов к нормальным
# /рабочим условиям
# 3.3. Минимальная работа разделения
# 4. Построение диаграмм
# 4.1. Диаграмма T-x
# 4.2. Диаграмма y-x
# 4.3. Диаграмма h-x
# 5. Построение теоретических тарелок
# 5.1. Метод Поншона-Бошняковича
# 5.1.1. Продукт - высококипящий компонент
# 5.1.2. Продукт - низкокипящий компонент
# 5.2. Метод Мак-Кеба и Тиле
# 5.2.1. Продукт - высококипящий компонент
# 5.2.2. Продукт - низкокипящий компонент
# 1. ПОДКЛЮЧЕНИЕ РАБОЧЕЙ СМЕСИ | К содержанию...
# [area: Подключение смеси]
# [reference: rfp2mcd(c) Release [mcd14].xmcd]
# Состав смеси:
hfld1 := "C:\Rfp8\fluids\NITROGEN.FLD|"  # NITROGEN.FLD
hfld2 := "C:\Rfp8\fluids\OXYGEN.FLD|"  # OXYGEN.FLD
hfld := concat(hfld1, hfld2)  # ARGON.FLD
i := 2
ierr_SETUP(i, hfld, hfm, hrf) = 0
# Примечание
#
# 1. Компоненты задавать в порядке возрастания нормальной температуры кипения.
# Столбцы концентраций чистых компонентов смеси:
x_н := [1; 0]
x_в := [0; 1]
# К содержанию...
# 2. ИСХОДНЫЕ ДАННЫЕ
# (минимально необходимые для построения тарелок по двум методам):
# Давление на входе (асб.):
p_вх := 3*атм = 303975 Па
p_раб := p_вх
# Концентрация компонентов смеси (мольные):
C_N2 := 0.79
C_O2 := 0.21
# Чистота низкокипящего компонента (азота):
C_нк := 0.99
# Чистота высококипящего компонента (аргона):
C_вк := 0.95
# Примечание
# 1. Если чистота низкокипящего компонента выше (он является продукционным), то расчет проводится по функциям и графикам с формулировкой "концентрационная колонна";
# 2. Если чистота высококипящего компонента выше (он является продукционным), то расчет проводится по функциям и графикам с формулировкой "исчерпывающая колонна";
# Параметры исходной смеси:
x_см := [C_N2; C_O2] = [0.79; 0.21]
# К содержанию...
# 3. ФОРМУЛЫ, ЗАВИСИМОСТИ И ВАРИАНТЫ РАСЧЕТА
# 3.1. Варианты расчета параметров ввода смеси в колонну
# 3.1.1. Задана температура вводимой в колонну смеси
# При этом температура должна быть в диапазоне:
T_max := T_s_py(p_раб, [x_см[0]; 1 - x_см[0]]) = 92.3632 K
T_min := T_s_px(p_раб, [x_см[0]; 1 - x_см[0]]) = 89.9187 K
T_см := 91 K
# Фазовый состав питающего потока
# - доля пара
y_п := q_phz(p_раб, h_Tpz(T_см, p_раб, x_см), x_см) = 0.595952
# - доля жидкости
x_ж := 1 - y_п = 0.404048
# 3.1.2. Задан фазовый состав питающего потока
# Доля пара в питающем потоке:
y_п := 0.6
x_ж := 1 - y_п = 0.4
# Температура вводимой в колонну смеси:
T_см. := 90 K
Given
q_phz(p_раб, h_Tpz(T_см., p_раб, x_см), x_см) == y_п
T_см := Find(T_см.) = 91.0106 K
# К содержанию...
# 3.2. Перевод массовых, мольных и объемных расходов к
# нормальным /рабочим условиям
# Перевод мольного расхода в массовый:
G_моль2кг(G, xxx) := G*μ_x(xxx)
# Перевод мольного расхода в массовый:
G_кг2моль(G, xxx) := G/μ_x(xxx)
# Перевод объемного расхода к мольному:
V_ммм2моль(V, T, p, xxx) := V/μ_x(xxx)*ρ_Tpz(T, p, xxx)
# Перевод мольного расхода к объемому:
V_моль2ммм(V, T, p, xxx) := V*μ_x(xxx)/ρ_Tpz(T, p, xxx)
# Перевод объемного рассхода в массовый:
G_ммм2кг(V, T, p, xxx) := V*ρ_Tpz(T, p, xxx)
# Перевод массового рассхода в объемный:
V_кг2ммм(G, T, p, xxx) := G/ρ_Tpz(T, p, xxx)
# Перевод объемных расходов от НУ (20°C, 760мм.рт.ст) к расчетным p,T:
V_ну2раб(V, p, T, xxx) := V*ρ_Tpz(T, p, xxx)/ρ_Tpz(293.14*K, 1*атм, xxx)
# Перевод объемных расходов от расчетных (p,T) к НУ (20°C, 760мм.рт.ст):
V_раб2ну(V, p, T, xxx) := V*ρ_Tpz(293.14*K, 1*атм, xxx)/ρ_Tpz(T, p, xxx)
# К содержанию...
# 3.3. Минимальная работа разделения
l_мин == -T_ос*Δs_p.мин
# Температура О.С.
T_ос := 20 °C = 293.15 K
Δs_p.мин == -Δs_n*P - Δs_w*W + Δs_0*M_0
M_0 := 1*моль/с  # - расход разделяемой смеси;
y_0 := C_нк = 0.99  # - исходная концентрация в смеси;
P := 0.4*моль/с  # - расход отхода;
W := 0.6*моль/с  # - расход продукта;
y_n := C_нк = 0.99  # - концентрация в отходе;
y_w := C_вк = 0.95  # - концентрация в продукте
R_угп := 8.31*Дж/(моль*K)
# Согласно закону Дальтона:
Δs_n := R_угп*(y_n*ln(y_n) + (1 - y_n)*ln(1 - y_n)) = -0.465373 Дж/(моль*K)
Δs_w := R_угп*(y_w*ln(y_w) + (1 - y_w)*ln(1 - y_w)) = -1.64966 Дж/(моль*K)
Δs_0 := R_угп*(y_0*ln(y_0) + (1 - y_0)*ln(1 - y_0)) = -0.465373 Дж/(моль*K)
Δs_p.мин := -Δs_n*P - Δs_w*W + Δs_0*M_0 = 0.710573 Вт/K
l_мин := -T_ос*Δs_p.мин = -208.305 Вт
# Для идеальной бинарной смеси при полном разделении:
l_мин0 := -T_ос*R_угп/y_0*(y_0*ln(y_0) + (1 - y_0)*ln(1 - y_0)) = 137.802 Дж/моль
l_мин1 := l_мин0*W = 82.6812 Вт
# Мощность компрессоров в реальном цикле (задаться числом ступеней):
N_k1 := □*кВт
N_k2 := □*кВт
N_k3 := □*кВт
N_k4 := □*кВт
# Мощность, реализщуемая в конденсаторе:
Q_k := □*кВт
# Мощность, реализщуемая в испарителе:
Q_и := □*кВт
# Работа разделения в реальном цикле на расход продукционного потока:
l := N_k1 + N_k2 + N_k3 + N_k4 + Q_k + Q_и = Вт
# Степень совершенства:
η := l_мин/l
η := l_мин1/l
# 4. ПОСТРОЕНИЕ ДИАГРАММ | К содержанию...
# 4.1. Диаграмма T-x
# [area: Построение T-x диаграммы]
# Ветви "рыбки"
T_кип(x) := T_s_px(p_раб, [x; 1 - x])
T_конд(x) := T_s_py(p_раб, [x; 1 - x])
x := 0, 0.05 .. 1
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p_раб = 3 атм
# 4.2. Диаграмма y-x | К содержанию...
# [area: Построение y-x диаграммы]
# Шаг 1. Вспомогательная функция для расчета концентрации насыщенного пара по температуре конденсации.
xx := 0.5
Given
T_s_py(p_раб, [xx; 1 - xx]) == TT
T_x_конд(TT) := Find(xx)
# Шаг 2. Функция для расчета концентрации низкокипящего компонента в паре (на линии конденсации) по концентрации низкокипящего компонента в жидкости (на линии кипении).
yy(xx) :=
    T ← T_s_px(p_раб, [xx; 1 - xx])
    yy ← T_x_конд(T)
    yy
# Шаг 3. Функция, описанная выше, потребляет много процессорного времени при расчетах по методу Мак-Кеба и Тиле, поэтому следует сделать приближенную интеполяцию этой функции. Для этого следует вывести значения функции yy(xx) при значениях xx, указанных ниже, и подставить значения yy(xx) и xx в столбцы интерполяции YYY и XXX. Это сделано автоматически в функции setY, если расчет происходи долго, скопируйте столбцы в excel, а затем вставьте его как константу.
xx := 0, 0.05 .. 1
xx = [0; 0.05; 0.1; 0.15; 0.2; 0.25; 0.3; 0.35; 0.4; 0.45; 0.5; 0.55; 0.6; 0.65; 0.7; 0.75; 0.8; 0.85; 0.9; 0.95; 1]
yy(xx) =  # no stored result; disabled
setY :=
    YX ← 0
    for i ∈ 0 .. 20
        YX[i] ← yy(i*0.05)
    YX
setX :=
    YX ← 0
    for i ∈ 0 .. 20
        YX[i] ← i*0.05
    YX
XX := setX
YY := setY
# Шаг 4. Интерполируем функцию.
YX_инт := cspline(XX, YY)
# Готовая к использованию функция:
y(xx) := interp(YX_инт, XX, YY, xx)
xx := 0, 0.05 .. 1
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p_раб = 3 атм
# 4.3. Диаграмма h-x | К содержанию...
# [area: Построение h-x диаграммы]
# Шаг 1. Определяем функции для построения линий кипения и конденсации в безразмерном виде.
# 1. Линия кипения
h_кип0(x) := h_Tpz(T_s_px(p_раб, [x; 1 - x]), p_раб, [x; 1 - x])*μ_x([x; 1 - x])/(Дж/моль)
# 2. Линия конденсации
h_конд0(x) := h_Tpz(T_s_py(p_раб, [x; 1 - x]), p_раб, [x; 1 - x])*μ_x([x; 1 - x])/(Дж/моль)
# Шаг 2. Определяем функцию изотермы в диаграмме h-x.
h_Tconst(T, x) := h_Tpz(T, p_раб, [x; 1 - x])*μ_x([x; 1 - x])/(Дж/моль)
# Шаг 3. Для ускорения дальнейшей работы с диаграммой выполним интеполяцию. Поскольку в областях значений х близких к 0 и 1 требуется большее количество точек, чем в центральной части, определим специальный итератор.
X :=
    A[0] ← 0
    ind ← 1
    for i ∈ 0 .. 99
        if i ≤ 10 or 90 ≤ i ≤ 100
            for j ∈ 1 .. 99
                A ← stack(A, 0.01*i + 0.0001*j)
            ind ← ind + 1
        otherwise
            A ← stack(A, 0.01*i)
            ind ← ind + 1
    A  # disabled
# Значения функции, изобржающей линию конденсации:
Y_конд :=
    A[0] ← 0
    ind ← 1
    for i ∈ 0 .. 99
        if i ≤ 10 or 90 ≤ i ≤ 100
            for j ∈ 1 .. 99
                A ← stack(A, h_конд0(0.01*i + 0.0001*j))
            ind ← ind + 1
        otherwise
            A ← stack(A, h_конд0(0.01*i))
            ind ← ind + 1
    A  # disabled
# Значения функции, изобржающей линию кипения:
Y_кип :=
    A[0] ← 0
    ind ← 1
    for i ∈ 0 .. 99
        if i ≤ 10 or 90 ≤ i ≤ 100
            for j ∈ 1 .. 99
                A ← stack(A, h_кип0(0.01*i + 0.0001*j))
            ind ← ind + 1
        otherwise
            A ← stack(A, h_кип0(0.01*i))
            ind ← ind + 1
    A  # disabled
# Шаг 4. Интерполяция функций.
# Для кривой конденсации:
h_конд := cspline(X, Y_конд)
h_конд(x) := interp(h_конд, X, Y_конд, x)
# Для кривой кипения:
h_кип := cspline(X, Y_кип)
h_кип(x) := interp(h_кип, X, Y_кип, x)
x := 0, 0.001 .. 1
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# 5. ПОСТРОЕНИЕ ТЕОРЕТИЧЕСКИХ ТАКРЕЛОК | К содержанию...
# 5.1. Метод Поншона-Бошняковича
# Примечание
# 1. Начальный этап расчета для всех типов колонн ведется одинаково, когда будут различия, последует соответствующая подпись;
# 2. По ходу расчета вставлены скриншоты графиков, исходные диаграммы помещены справа. Это сделано для экономии времени при разработке листинга;
# 3. По ходу расчета могут потребоваться дополнительные функции, которые будут помещены в блоки, обрамленные как * Вспомогатльные функции *;
# 4. Для удобства расчет энтальпии приведены к безразмерному виду (Дж/моль).
# Температура смеси на входе в колонну:
T_см = 91.0106 K
# * Вспомогательные функции
# 1. Расчет энтальпии по температуре и концентрации НК компонента:
h_ПБ_Tx(T, x) := h_Tpz(T, p_раб, [x; 1 - x])*μ_x([x; 1 - x])*(Дж/моль)^-1
# Вспомогательные функции *
# В соответствии с обозначениями, принятыми на семинаре, точка ввода смеси в колонну обозначается как М. Параметры точки М:
h_M := h_ПБ_Tx(T_см, x_см[0]) = 222.462
x_M := x_см[0] = 0.79
# Построим изотерму ввода смеси в колонну и отметим точку М:
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# * Вспомогательные функции
# 2. Функция возвращает коэффициенты прямой, проходей через 2 точки:
line(X1, Y1, X2, Y2) :=
    A_l ← Y2 - Y1
    B_l ← X1 - X2
    C_l ← X2*Y1 - X1*Y2
    k_l ← -A_l/B_l
    b_l ← -C_l/B_l
    [k_l; b_l]
# 3. Функции возвращают значение концентраций, через которые проходит
# изотерма Т на линии конденсации и на линии кипения (значения х, при которых изотерма пересекает линию конденсации и кипения):
Given
xx := 0.334
h_Tpz(TT, p_раб, [xx; 1 - xx]) == h_Tpz(T_s_px(p_раб, [xx; 1 - xx]), p_раб, [xx; 1 - xx])
x_Teq(TT) := Find(xx)
Given
xx1 := 0.8
h_Tpz(TT, p_раб, [xx1; 1 - xx1]) == h_Tpz(T_s_py(p_раб, [xx1; 1 - xx1]), p_раб, [xx1; 1 - xx1])
y_Teq(TT) := Find(xx1)
# Примечение
# 1. Если какой-то из блоков не рассчитывает значение и горит красным или возвращает абсурдные значения, измените приближения (отмечены желтым).
# Вспомогательные функции *
# Координаты точек пересечения  изотермы температуры ввода смеси и линии конденсации и линии кипения, концентрации:
X_M_T' := x_Teq(T_см) = 0.679712
X_M_T'' := y_Teq(T_см) = 0.863525
X_M := x_см[0] = 0.79
# Энтальпии:
h_M_T' := h_кип0(X_M_T') = -3118.36
h_M_T'' := h_конд0(X_M_T'') = 2449.68
# Уравнение минимальной главной прямой (проходит через изотерму T_см):
KK := line(X_M_T', h_M_T', X_M_T'', h_M_T'')
Line_min(z) := KK[0]*z + KK[1]
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# К содержанию...
# 5.1.1. Продукт - высококипящий компонент
# В это случае минимальный полюс располагается в левой нижней части диаграммы. Чтобы найти значение энтальпии минимального полюса, следует подставить в уравнение минимальной главной прямой концентрацию низкокипящего компонента в высококипящем продукте.
# Концентрация НК компонента в ВК продукте:
X_R := 1 - C_вк = 0.05
# Энтальпия минимального полюса:
P_min_ВК := Line_min(X_R) = -22193.5
# Минимальное флегмовое отношение, соответсвующее минимальному флегмовому числу:
f'_min := (P_min_ВК - h_M_T'')/(P_min_ВК - h_M_T') = 1.2919
# Минимальное флегмовое число:
υ'_min := f'_min/(f'_min - 1) = 4.42583
# Запас по флегмовому числу:
υ'_раб := 1.25*υ'_min = 5.53229
# Рабочее флегмовое отношение:
f'_раб := υ'_раб/(υ'_раб - 1) = 1.22064
# Координаты рабочего полюса:
P_раб := -10000
Given
(P_раб - h_M_T'')/(P_раб - h_M_T') == f'_раб
P_раб_ВК := Find(P_раб) = -28354.3
# Примечение
# 1. Если блок не рассчитывает значение и горит красным или возвращает абсурдные значения, измените приближения (отмечены желтым).
# Точки для диаграммы:
X_point := [X_R; X_R]
h_point := [P_раб_ВК; P_min_ВК]
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# Примечание
# 1. Для каждой секции выполняется расчет числа тарелок и координат для построения диаграммы. Если расчет проводится для односекционной колонны, то используется только первая часть расчета для каждой колонны;
# 2. Если в скрытых областях не происходит расчет или происходит с ошибкой, измените приближения в блоке * Вспомогательные функции *.
# [area: Часть 1. Построение тарелок в исчерпывающей секции]
# * Вспомогательные функции
h_конд(x)
y(xx)
h_кип(x)
# 4. Точка пересечения конноды и линии конденсации
xx := 0.5
Given
h_конд(xx) == kb[0]*xx + kb[1]
X_конд_коннода(kb) := Find(xx)
# 5. Равновесная пару концентрация НК в жидкости
xx := 0.5
Given
y(xx) == xxx
X_кип_изотерма(xxx) := Find(xx)
# Вспомогательные функции *
Calc_исч_исч :=
    "Счетчик коннод"
    g ← -1
    "Счетчик тарелок"
    N_т ← 1
    "Счетчик точек"
    i ← 0
    "Координаты полюса"
    P_X ← X_R
    P_Y ← P_раб_ВК
    "Координаты насыщенной жидкости при температуре ввода смеси"
    X_ц[i] ← X_M_T'
    h_ц[i] ← h_M_T'
    "Уравнение линии, проходящей через эту точку и полюс"
    kb ← line(X_ц[i], h_ц[i], P_X, P_Y)
    "Координаты точки пересеения конноды и линии конденсации"
    i ← i + 1
    X_ц[i] ← X_конд_коннода(kb)
    h_ц[i] ← kb[0]*X_ц[i] + kb[1]
    "Равновесная пару концентрация НК в жидкости"
    i ← i + 1
    X_ц[i] ← X_кип_изотерма(X_ц[i - 1])
    h_ц[i] ← h_кип(X_ц[i])
    "Добавление конноды в массив"
    g ← g + 1
    X1_ц[g] ← P_X
    h1_ц[g] ← P_Y
    g ← g + 1
    X1_ц[g] ← X_ц[i - 2]
    h1_ц[g] ← h_ц[i - 2]
    "Повторяем все то, что выше, пока не достигнем требуемой чистоты"
    X_RR ← X_ц[i]
    while X_RR > X_R
        "Уравнение линии, проходящей через последнюю точку и полюс"
        kb ← line(X_ц[i], h_ц[i], P_X, P_Y)
        "Координаты точки пересеения конноды и линии конденсации"
        i ← i + 1
        X_ц[i] ← X_конд_коннода(kb)
        h_ц[i] ← kb[0]*X_ц[i] + kb[1]
        "Равновесная пару концентрация НК в жидкости"
        i ← i + 1
        X_ц[i] ← X_кип_изотерма(X_ц[i - 1])
        h_ц[i] ← h_кип(X_ц[i])
        "Добавление конноды в массив"
        g ← g + 1
        X1_ц[g] ← P_X
        h1_ц[g] ← P_Y
        g ← g + 1
        X1_ц[g] ← X_ц[i - 2]
        h1_ц[g] ← h_ц[i - 2]
        "Добавление тарелки"
        N_т ← N_т + 1
        X_RR ← X_ц[i]
    [X_ц; h_ц; N_т; X1_ц; h1_ц]
# Результат расчета для исчерпывающей секции
# Координаты точек
X_исч_исч := Calc_исч_исч[0]
Y_исч_исч := Calc_исч_исч[1]
# Координаты коннод
X_конн_исч_исч := Calc_исч_исч[3]
Y_конн_исч_исч := Calc_исч_исч[4]
# Расчетное число теоретических тарелок исчерпывающей секции:
N_исч_исч := Calc_исч_исч[2]
# Номер последней точки в массиве
ni := last(X_исч_исч)
# Концентрация продукционного потока по НК компоненту:
y_R_исч := 1 - X_исч_исч[ni]
# Требуемая концентрация потока:
C_вк = 0.95
# Продолжение расчета для двухсекционной колонны...
# Координата полюса концентрационной секции:
X_D := C_нк = 0.99
KK := line(X_R, P_раб_ВК, X_M, h_M)
Line_base(z) := KK[0]*z + KK[1]
P_раб_НК := Line_base(X_D) = 7945.91
# [area: Часть 2. Построение тарелок в концентрационной секции]
# * Вспомогательные функции
h_конд(x)
y(xx)
h_кип(x)
# 6. Точка пересечения конноды и линии кипения
xx := 0.5
Given
h_кип(xx) == kb[0]*xx + kb[1]
X_кип_коннода(kb) := Find(xx)
Calc_исч_конц :=
    "Счетчик коннод"
    g ← -1
    "Счетчик тарелок"
    N_т ← 1
    "Счетчик точек"
    i ← 0
    "Координаты полюса"
    P_X ← X_D
    P_Y ← P_раб_НК
    "Координаты насыщенного пара при температуре ввода смеси"
    X_ц[i] ← X_M_T''
    h_ц[i] ← h_M_T''
    "Уравнение линии, проходящей через эту точку и полюс"
    kb ← line(X_ц[i], h_ц[i], P_X, P_Y)
    "Координаты точки пересеения конноды и линии кипения"
    i ← i + 1
    X_ц[i] ← X_кип_коннода(kb)
    h_ц[i] ← kb[0]*X_ц[i] + kb[1]
    "Равновесная пару концентрация НК в жидкости"
    i ← i + 1
    X_ц[i] ← y(X_ц[i - 1])
    h_ц[i] ← h_конд(X_ц[i])
    "Добавление конноды в массив"
    g ← g + 1
    X1_ц[g] ← P_X
    h1_ц[g] ← P_Y
    g ← g + 1
    X1_ц[g] ← X_ц[i - 2]
    h1_ц[g] ← h_ц[i - 2]
    "Повторяем все то, что выше, пока не достигнем требуемой чистоты"
    X_DD ← X_ц[i]
    while X_DD < X_D
        "Уравнение линии, проходящей через последнюю точку и полюс"
        kb ← line(X_ц[i], h_ц[i], P_X, P_Y)
        "Координаты точки пересеения конноды и линии конденсации"
        i ← i + 1
        X_ц[i] ← X_кип_коннода(kb)
        h_ц[i] ← kb[0]*X_ц[i] + kb[1]
        "Равновесная жидкости концентрация НК в паре"
        i ← i + 1
        X_ц[i] ← y(X_ц[i - 1])
        h_ц[i] ← h_конд(X_ц[i])
        "Добавление конноды в массив"
        g ← g + 1
        X1_ц[g] ← P_X
        h1_ц[g] ← P_Y
        g ← g + 1
        X1_ц[g] ← X_ц[i - 2]
        h1_ц[g] ← h_ц[i - 2]
        "Добавление тарелки"
        N_т ← N_т + 1
        X_DD ← X_ц[i]
    [X_ц; h_ц; N_т; X1_ц; h1_ц]
# Результат расчета для концентрационной секции
# Координаты точек
X_исч_конц := Calc_исч_конц[0]
Y_исч_конц := Calc_исч_конц[1]
# Координаты коннод
X_конн_исч_конц := Calc_исч_конц[3]
Y_конн_исч_конц := Calc_исч_конц[4]
# Расчетное число теоретических тарелок концентрационной секции:
N_исч_конц := Calc_исч_конц[2]
# Номер последней точки в массиве
ni := last(X_исч_конц)
# Концентрация продукционного потока по НК компоненту:
X_исч_ПБ := X_исч_конц[ni]
# Требуемая концентрация потока:
C_нк = 0.99
# Примечание
# 1. Ниже расположены области с графиками. На графиках отображены результаты расчета для односекционной или двухсекционной колонны.
# 2. Для красивого представления используются вспомогательные функции и массивы, которые представлены ниже.
# [area: Вспомогательные переменные для графиков]
# Точка входа смеси М:
тM := [x_M; h_M] = [0.79; 222.462]
# Минимальный полюс:
П_мин_исч_исч := [X_R; P_min_ВК] = [0.05; -22193.5]
# Рабочий полюс:
П_раб_исч_исч := [X_R; P_раб_ВК] = [0.05; -28354.3]
# Полюс концентрационной секции (для двухсекционной колонны):
П_раб_исч_конц := [X_D; P_раб_НК] = [0.99; 7945.91]
# Главная линия
X_гл_лин := [X_R; X_D]
Y_гл_лин := [P_раб_ВК; P_раб_НК]
# Все точки в сборке:
X_point_all := [тM[0]; П_мин_исч_исч[0]; П_раб_исч_исч[0]; П_раб_исч_конц[0]]
h_point_all := [тM[1]; П_мин_исч_исч[1]; П_раб_исч_исч[1]; П_раб_исч_конц[1]]
X_point := [тM[0]; П_мин_исч_исч[0]; П_раб_исч_исч[0]]
h_point := [тM[1]; П_мин_исч_исч[1]; П_раб_исч_исч[1]]
x := 0, 0.005 .. 1
# [area: Односекционная колонна]
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# Дж/моль
# [area: Двухсекционная колонна]
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# Дж/моль
# К содержанию...
# 5.1.2. Продукт - низкокипящий компонент
# В это случае минимальный полюс располагается в правой верхней части диаграммы. Чтобы найти значение энтальпии минимального полюса, следует подставить в уравнение минимальной главной прямой концентрацию низкокипящего компонента в низкокипящем продукте.
# Концентрация НК компонента в НК продукте:
X_D := C_нк = 0.99
# Энтальпия минимального полюса:
P_min_НК := Line_min(X_D) = 6280.83
# Минимальное флегмовое отношение, соответсвующее минимальному флегмовому числу:
f_min := (P_min_НК - h_M_T'')/(P_min_НК - h_M_T') = 0.407605
# Минимальное флегмовое число:
υ_min := f_min/(1 - f_min) = 0.688062
# Запас по флегмовому числу:
υ_раб := 1.25*υ_min = 0.860077
# Рабочее флегмовое отношение:
f_раб := υ_раб/(1 + υ_раб) = 0.462388
# Координаты рабочего полюса:
P_раб := 10000
Given
(P_раб - h_M_T'')/(P_раб - h_M_T') == f_раб
P_раб_НК := Find(P_раб) = 7238.62
# Примечение
# 1. Если блок не рассчитывает значение и горит красным или возвращает абсурдные значения, измените приближения (отмечены желтым).
# Точки для диаграммы:
X_point := [X_D; X_D]
h_point := [P_раб_НК; P_min_НК]
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# Примечание
# 1. Для каждой секции выполняется расчет числа тарелок и координат для построения диаграммы. Если расчет проводится для односекционной колонны, то используется только первая часть расчета для каждой колонны;
# 2. Если в скрытых областях не происходит расчет или происходит с ошибкой, измените приближения в блоке * Вспомогательные функции *.
# [area: Часть 1. Построение тарелок в концентрационной секции]
# * Вспомогательные функции
h_конд(x)
y(xx)
h_кип(x)
# 6. Точка пересечения конноды и линии кипения
xx := 0.5
Given
h_кип(xx) == kb[0]*xx + kb[1]
X_кип_коннода(kb) := Find(xx)
Calc_конц_конц :=
    "Счетчик коннод"
    g ← -1
    "Счетчик тарелок"
    N_т ← 1
    "Счетчик точек"
    i ← 0
    "Координаты полюса"
    P_X ← X_D
    P_Y ← P_раб_НК
    "Координаты насыщенного пара при температуре ввода смеси"
    X_ц[i] ← X_M_T''
    h_ц[i] ← h_M_T''
    "Уравнение линии, проходящей через эту точку и полюс"
    kb ← line(X_ц[i], h_ц[i], P_X, P_Y)
    "Координаты точки пересеения конноды и линии кипения"
    i ← i + 1
    X_ц[i] ← X_кип_коннода(kb)
    h_ц[i] ← kb[0]*X_ц[i] + kb[1]
    "Равновесная пару концентрация НК в жидкости"
    i ← i + 1
    X_ц[i] ← y(X_ц[i - 1])
    h_ц[i] ← h_конд(X_ц[i])
    "Добавление конноды в массив"
    g ← g + 1
    X1_ц[g] ← P_X
    h1_ц[g] ← P_Y
    g ← g + 1
    X1_ц[g] ← X_ц[i - 2]
    h1_ц[g] ← h_ц[i - 2]
    "Повторяем все то, что выше, пока не достигнем требуемой чистоты"
    X_DD ← X_ц[i]
    while X_DD < X_D
        "Уравнение линии, проходящей через последнюю точку и полюс"
        kb ← line(X_ц[i], h_ц[i], P_X, P_Y)
        "Координаты точки пересеения конноды и линии конденсации"
        i ← i + 1
        X_ц[i] ← X_кип_коннода(kb)
        h_ц[i] ← kb[0]*X_ц[i] + kb[1]
        "Равновесная жидкости концентрация НК в паре"
        i ← i + 1
        X_ц[i] ← y(X_ц[i - 1])
        h_ц[i] ← h_конд(X_ц[i])
        "Добавление конноды в массив"
        g ← g + 1
        X1_ц[g] ← P_X
        h1_ц[g] ← P_Y
        g ← g + 1
        X1_ц[g] ← X_ц[i - 2]
        h1_ц[g] ← h_ц[i - 2]
        "Добавление тарелки"
        N_т ← N_т + 1
        X_DD ← X_ц[i]
    [X_ц; h_ц; N_т; X1_ц; h1_ц]
# Результат расчета для концентрационной секции
# Координаты точек
Y_конц_конц := Calc_конц_конц[1]
X_конц_конц := Calc_конц_конц[0]
# Координаты коннод
X_конн_конц_конц := Calc_конц_конц[3]
Y_конн_конц_конц := Calc_конц_конц[4]
# Расчетное число теоретических тарелок концентрационной секции:
N_конц_конц := Calc_конц_конц[2]
# Номер последней точки в массиве
ni := last(X_конц_конц)
# Концентрация продукционного потока по НК компоненту:
X_конц_ПБ := X_конц_конц[ni]
# Требуемая концентрация потока:
C_нк = 0.99
# Продолжение расчета для двухсекционной колонны...
# Координата полюса исчерпывающей секции:
X_R := 1 - C_вк = 0.05
KK := line(X_D, P_раб_НК, X_M, h_M)
Line_base(z) := KK[0]*z + KK[1]
P_раб_ВК := Line_base(X_R) = -25737.3
# [area: Часть 2. Построение тарелок в исчерпывающей секции]
# * Вспомогательные функции
h_конд(x)
y(xx)
h_кип(x)
# 4. Точка пересечения конноды и линии конденсации
xx := 0.5
Given
h_конд(xx) == kb[0]*xx + kb[1]
X_конд_коннода(kb) := Find(xx)
# 5. Равновесная пару концентрация НК в жидкости
xx := 0.5
Given
y(xx) == xxx
X_кип_изотерма(xxx) := Find(xx)
# Вспомогательные функции *
Calc_конц_исч :=
    "Счетчик коннод"
    g ← -1
    "Счетчик тарелок"
    N_т ← 1
    "Счетчик точек"
    i ← 0
    "Координаты полюса"
    P_X ← X_R
    P_Y ← P_раб_ВК
    "Координаты насыщенной жидкости при температуре ввода смеси"
    X_ц[i] ← X_M_T'
    h_ц[i] ← h_M_T'
    "Уравнение линии, проходящей через эту точку и полюс"
    kb ← line(X_ц[i], h_ц[i], P_X, P_Y)
    "Координаты точки пересеения конноды и линии конденсации"
    i ← i + 1
    X_ц[i] ← X_конд_коннода(kb)
    h_ц[i] ← kb[0]*X_ц[i] + kb[1]
    "Равновесная пару концентрация НК в жидкости"
    i ← i + 1
    X_ц[i] ← X_кип_изотерма(X_ц[i - 1])
    h_ц[i] ← h_кип(X_ц[i])
    "Добавление конноды в массив"
    g ← g + 1
    X1_ц[g] ← P_X
    h1_ц[g] ← P_Y
    g ← g + 1
    X1_ц[g] ← X_ц[i - 2]
    h1_ц[g] ← h_ц[i - 2]
    "Повторяем все то, что выше, пока не достигнем требуемой чистоты"
    X_RR ← X_ц[i]
    while X_RR > X_R
        "Уравнение линии, проходящей через последнюю точку и полюс"
        kb ← line(X_ц[i], h_ц[i], P_X, P_Y)
        "Координаты точки пересеения конноды и линии конденсации"
        i ← i + 1
        X_ц[i] ← X_конд_коннода(kb)
        h_ц[i] ← kb[0]*X_ц[i] + kb[1]
        "Равновесная пару концентрация НК в жидкости"
        i ← i + 1
        X_ц[i] ← X_кип_изотерма(X_ц[i - 1])
        h_ц[i] ← h_кип(X_ц[i])
        "Добавление конноды в массив"
        g ← g + 1
        X1_ц[g] ← P_X
        h1_ц[g] ← P_Y
        g ← g + 1
        X1_ц[g] ← X_ц[i - 2]
        h1_ц[g] ← h_ц[i - 2]
        "Добавление тарелки"
        N_т ← N_т + 1
        X_RR ← X_ц[i]
    [X_ц; h_ц; N_т; X1_ц; h1_ц]
# Результат расчета для исчерпывающей секции
# Координаты точек
X_конц_исч := Calc_конц_исч[0]
Y_конц_исч := Calc_конц_исч[1]
# Координаты коннод
X_конн_конц_исч := Calc_конц_исч[3]
Y_конн_конц_исч := Calc_конц_исч[4]
# Расчетное число теоретических тарелок исчерпывающей секции:
N_конц_исч := Calc_конц_исч[2]
# Номер последней точки в массиве
ni := last(X_конц_исч)
# Концентрация продукционного потока по НК компоненту:
y_R_конц := 1 - X_конц_исч[ni]
# Требуемая концентрация потока:
C_вк = 0.95
# Примечание
# 1. Ниже расположены области с графиками. На графиках отображены результаты расчета для односекционной или двухсекционной колонны.
# 2. Для красивого представления используются вспомогательные функции и массивы, которые представлены ниже.
# [area: Вспомогательные переменные для графиков]
# Точка входа смеси М:
тM := [x_M; h_M] = [0.79; 222.462]
# Минимальный полюс:
П_мин_конц_конц := [X_D; P_min_НК] = [0.99; 6280.83]
# Рабочий полюс:
П_раб_конц_конц := [X_D; P_раб_НК] = [0.99; 7238.62]
# Полюс исчерпывающей секции (для двухсекционной колонны):
П_раб_конц_исч := [X_R; P_раб_ВК] = [0.05; -25737.3]
# Главная линия
X_гл_лин := [X_R; X_D]
Y_гл_лин := [P_раб_ВК; P_раб_НК]
# Все точки в сборке:
X_point_all := [тM[0]; П_мин_конц_конц[0]; П_раб_конц_конц[0]; П_раб_конц_исч[0]]
h_point_all := [тM[1]; П_мин_конц_конц[1]; П_раб_конц_конц[1]; П_раб_конц_исч[1]]
X_point := [тM[0]; П_мин_конц_конц[0]; П_раб_конц_конц[0]]
h_point := [тM[1]; П_мин_конц_конц[1]; П_раб_конц_конц[1]]
x := 0, 0.005 .. 1
# [area: Односекционная колонна]
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# Дж/моль
# [area: Двухсекционная колонна]
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# Дж/моль
# К содержанию...
# 5.2. Метод Мак-Кеба и Тиле
# Заготовка диаграммы для построения тарелок
# Пропорции горизонтальные:
Y_проп_г := [X_M; X_M]
X_проп_г := [X_M; X_M - y_п*0.15]
# Пропорции вертикальные:
X_проп_в := [X_M; X_M]
Y_проп_в := [X_M; X_M + x_ж*0.15]
# Уравнение линии для нахождения рабочей точки:
# Функция line() находится здесь...
kb_M := line(X_M, X_M, X_M - y_п, X_M + x_ж)
y_тM(xx) := kb_M[0]*xx + kb_M[1]
# Точка пересечения этой линии и линии равновесных состояний:
xxx := 0.5
Given
y(xxx) == y_тM(xxx)
X_M' := Find(xxx)
X_M' = 0.679712
Y_M' := y(X_M') = 0.863525
xx := 0, 0.001 .. 1
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# 5.2.1. Продукт - высококипящий компонент | К содержанию...
# Расчет можно проводит в друх направлениях. 1 - задаться рабочим флегмовым отношением, затем рассчитать коэффициент запаза; 2 - рассчитать его через коэффициент запаса и минимальное значение. В данном случае будет рассмотрен первый вариант, но адаптировать расчет под 2 вариант достаточно просто.
# Флегмовое отношение рабочее:
f_раб_исч := f'_раб = 1.22064
# Уравнение рабочей линии исчерпывающей секции:
b_к_исч := X_R - f_раб_исч*X_R
y_исч(z) := f_раб_исч*z + b_к_исч
# Определим точку пересечения (рабочая точка) рабочей линии и дополнительной линии:
xxx := 0.4
Given
y_тM(xxx) == y_исч(xxx)
X_M'' := Find(xxx) = 0.703489
Y_M'' := y_тM(X_M'') = 0.847674
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# * Продолжение расчета для двухсекционной колонны...
# Уравнение рабочей линии концентрационной  секции:
kb_исч_конц := line(X_M'', Y_M'', X_D, X_D)
y_исч_конц(z2) := kb_исч_конц[0]*z2 + kb_исч_конц[1]
# Продолжение расчета для двухсекционной колонны... *
# Доля пара во вводимой смеси:
y_п = 0.6
# Доля жидкости во вводимой смеси:
x_ж = 0.4
# Флегмое отношение, соответсвующее флегмовому числу по методу МакКэба и Тиле:
kb_исч := line(X_R, X_R, X_M'', Y_M'')
f_раб_исч_МкТ := kb_исч[0] = 1.22064
# Флегмовое число по методу МакКэба и Тиле:
υ_раб_исч_МкТ := f_раб_исч_МкТ/(f_раб_исч_МкТ - 1) = 5.53229
# Коэффициент запаса по избытку флегмы:
k_F2_исч := υ_раб_исч_МкТ/υ'_min = 1.25
# Это значение должно полностью совпадать с тем запасом, который был заложен для заданного рабочего флегмового отношения!
# Для этого примера совпадать с коэффициентом, заданном в этом выражении ...
# Примечание
# 1. Для каждой секции выполняется расчет числа тарелок и координат для построения диаграммы. Если расчет проводится для односекционной колонны, то используется только первая часть расчета для каждой колонны;
# 2. Если в скрытых областях не происходит расчет или происходит с ошибкой, измените приближения в блоке * Вспомогательные функции *.
# [area: Часть 1. Построение тарелок исчерпывающей секции]
# * Вспомогательные функции
# 6. Поиск концентрации НК в жидкости по известной концентрации НК в паре на рабочей линии
xxx := 0.6
Given
y_исч(xxx) == yyy
X_исч_y_исч(yyy) := Find(xxx)
# Вспомогательные функции *
Calc_исч_исч :=
    i ← 0
    N ← 1
    X[i] ← X_R
    Y[i] ← X_R
    i ← i + 1
    X[i] ← X[i - 1]
    Y[i] ← y(X[i])
    i ← i + 1
    Y[i] ← Y[i - 1]
    X[i] ← X_исч_y_исч(Y[i])
    X_исч ← X[i]
    while X_исч < X_M''
        i ← i + 1
        X[i] ← X[i - 1]
        Y[i] ← y(X[i])
        i ← i + 1
        Y[i] ← Y[i - 1]
        X[i] ← X_исч_y_исч(Y[i])
        N ← N + 1
        X_исч ← X[i]
    [X; Y; N]
# Результат расчета для исчерпывающей секции
# Координаты точек
X_исч_исч := Calc_исч_исч[0]
Y_исч_исч := Calc_исч_исч[1]
# Расчетное число теоретических тарелок концентрационной секции:
N_т_исч_исч := Calc_исч_исч[2] = 6
# Номер последней точки в массиве
ni := last(X_исч_исч) = 12
# Концентрация в точке начала разделения:
X_исч_M'' := X_исч_исч[ni] = 0.713296
# Концентрация в точке M'':
X_M'' = 0.703489
# [area: Часть 2. Построение тарелок концентрационной секции]
# * Вспомогательные функции
# 7. Поиск концентрации НК в жидкости по известной концентрации НК в паре на  линии равновесных состояний
xxx := 0.6
Given
y(xxx) == yyy
X_исч_y(yyy) := Find(xxx)
# Вспомогательные функции *
Calc_исч_конц :=
    i ← 0
    N ← 1
    X[i] ← X_D
    Y[i] ← X_D
    i ← i + 1
    Y[i] ← Y[i - 1]
    X[i] ← X_исч_y(Y[i])
    i ← i + 1
    X[i] ← X[i - 1]
    Y[i] ← y_исч_конц(X[i])
    X_конц ← X[i]
    while X_конц > X_M''
        i ← i + 1
        Y[i] ← Y[i - 1]
        X[i] ← X_исч_y(Y[i])
        i ← i + 1
        X[i] ← X[i - 1]
        N ← N + 1
        Y[i] ← y_исч_конц(X[i])
        X_конц ← X[i]
    [X; Y; N]
# Результат расчета для концентрационной секции
# Координаты точек
X_исч_конц := Calc_исч_конц[0]
Y_исч_конц := Calc_исч_конц[1]
# Расчетное число теоретических тарелок концентрационной секции:
N_т_исч_конц := Calc_исч_конц[2] = 7
# Номер последней точки в массиве
ni := last(X_исч_конц) = 14
# Концентрация в точке начала разделения:
X_исч_конц_M'' := X_исч_конц[ni] = 0.698839
# Концентрация в точке M'':
X_M'' = 0.703489
# Примечание
# 1. Ниже расположены области с графиками. На графиках отображены результаты расчета для односекционной или двухсекционной колонны.
# 2. Для красивого представления используются вспомогательные функции и массивы, которые представлены ниже.
# [area: Вспомогательные переменные для графиков]
# Точка входа смеси М:
тM := [X_M''; Y_M''] = [0.703489; 0.847674]
# Точка R:
тR := [X_R; y(X_R)] = [0.05; 0.142013]
# Точка D
тD := [X_D; y(X_D)] = [0.99; 0.996605]
# Все точки в сборке:
X_point_all := [тM[0]; тR[0]; тD[0]]
h_point_all := [тM[1]; тR[1]; тD[1]]
X_point := [тM[0]; тR[0]]
h_point := [тM[1]; тR[1]]
x := 0, 0.005 .. 1
# [area: Односекционная колонна]
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# [area: Двухсекционная колонна]
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# К содержанию...
# 5.2.2. Продукт - низкокипящий компонент
# Расчет можно проводит в друх направлениях. 1 - задаться рабочим флегмовым отношением, затем рассчитать коэффициент запаза; 2 - рассчитать его через коэффициент запаса и минимальное значение. В данном случае будет рассмотрен первый вариант, но адаптировать расчет под 2 вариант достаточно просто.
# Флегмовое отношение рабочее:
f_раб_конц := f_раб = 0.462388
# Уравнение рабочей линии концентрационной секции:
b_к_конц := X_D - f_раб_конц*X_D
y_конц(z) := f_раб_конц*z + b_к_конц
# Определим точку пересечения (рабочая точка) рабочей линии и дополнительной линии:
xxx := 0.4
Given
y_тM(xxx) == y_конц(xxx)
X_M'' := Find(xxx) = 0.694768
Y_M'' := y_тM(X_M'') = 0.853488
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# * Продолжение расчета для двухсекционной колонны...
# Уравнение рабочей линии концентрационной  секции:
kb_конц_исч := line(X_M'', Y_M'', X_R, X_R)
y_конц_исч(z2) := kb_конц_исч[0]*z2 + kb_конц_исч[1]
# Продолжение расчета для двухсекционной колонны... *
# Доля пара во вводимой смеси:
y_п = 0.6
# Доля жидкости во вводимой смеси:
x_ж = 0.4
# Флегмое отношение, соответсвующее флегмовому числу по методу МакКэба и Тиле:
kb_конц := line(X_D, X_D, X_M'', Y_M'')
f_раб_конц_МкТ := kb_конц[0] = 0.462388
# Флегмовое число по методу МакКэба и Тиле:
υ_раб_конц_МкТ := f_раб_конц_МкТ/(1 - f_раб_конц_МкТ) = 0.860077
# Коэффициент запаса по избытку флегмы:
k_F2_конц := υ_раб_конц_МкТ/υ_min = 1.25
# Это значение должно полностью совпадать с тем запасом, который был заложен для заданного рабочего флегмового отношения!
# Для этого примера совпадать с коэффициентом, заданном в этом выражении ...
# Примечание
# 1. Для каждой секции выполняется расчет числа тарелок и координат для построения диаграммы. Если расчет проводится для односекционной колонны, то используется только первая часть расчета для каждой колонны;
# 2. Если в скрытых областях не происходит расчет или происходит с ошибкой, измените приближения в блоке * Вспомогательные функции *.
# [area: Часть 1. Построение тарелок концентрационной секции]
# * Вспомогательные функции
# 7. Поиск концентрации НК в жидкости по известной концентрации НК в паре на  линии равновесных состояний
xxx := 0.6
Given
y(xxx) == yyy
X_конц_y(yyy) := Find(xxx)
# Вспомогательные функции *
Calc_конц_конц :=
    i ← 0
    N ← 1
    X[i] ← X_D
    Y[i] ← X_D
    i ← i + 1
    Y[i] ← Y[i - 1]
    X[i] ← X_конц_y(Y[i])
    i ← i + 1
    X[i] ← X[i - 1]
    Y[i] ← y_конц(X[i])
    X_конц ← X[i]
    while X_конц > X_M''
        i ← i + 1
        Y[i] ← Y[i - 1]
        X[i] ← X_конц_y(Y[i])
        i ← i + 1
        X[i] ← X[i - 1]
        N ← N + 1
        Y[i] ← y_конц(X[i])
        X_конц ← X[i]
    [X; Y; N]
# Результат расчета для концентрационной секции
# Координаты точек
Y_конц_конц := Calc_конц_конц[1]
X_конц_конц := Calc_конц_конц[0]
# Расчетное число теоретических тарелок концентрационной секции:
N_т_конц_конц := Calc_конц_конц[2] = 9
# Номер последней точки в массиве
ni := last(X_конц_конц) = 18
# Концентрация в точке начала разделения:
X_конц_конц_M'' := X_конц_конц[ni] = 0.674042
# Концентрация в точке M'':
X_M'' = 0.694768
# [area: Часть 2. Построение тарелок исчерпывающей секции]
# * Вспомогательные функции
# 6. Поиск концентрации НК в жидкости по известной концентрации НК в паре на рабочей линии
xxx := 0.5
Given
y_конц_исч(xxx) == yyy
X_конц_y_конц(yyy) := Find(xxx)
# Вспомогательные функции *
Calc_конц_исч :=
    i ← 0
    N ← 1
    X[i] ← X_R
    Y[i] ← X_R
    i ← i + 1
    X[i] ← X[i - 1]
    Y[i] ← y(X[i])
    i ← i + 1
    Y[i] ← Y[i - 1]
    X[i] ← X_конц_y_конц(Y[i])
    X_исч ← X[i]
    while X_исч < X_M''
        i ← i + 1
        X[i] ← X[i - 1]
        Y[i] ← y(X[i])
        i ← i + 1
        Y[i] ← Y[i - 1]
        X[i] ← X_конц_y_конц(Y[i])
        N ← N + 1
        X_исч ← X[i]
    [X; Y; N]
# Результат расчета для исчерпывающей секции
# Координаты точек
X_конц_исч := Calc_конц_исч[0]
Y_конц_исч := Calc_конц_исч[1]
# Расчетное число теоретических тарелок концентрационной секции:
N_т_конц_исч := Calc_конц_исч[2] = 7
# Номер последней точки в массиве
ni := last(X_конц_исч) = 14
# Концентрация в точке начала разделения:
X_конц_M'' := X_конц_исч[ni] = 0.706928
# Концентрация в точке M'':
X_M'' = 0.694768
# Примечание
# 1. Ниже расположены области с графиками. На графиках отображены результаты расчета для односекционной или двухсекционной колонны.
# 2. Для красивого представления используются вспомогательные функции и массивы, которые представлены ниже.
# [area: Вспомогательные переменные для графиков]
# Точка входа смеси М:
тM := [X_M''; Y_M''] = [0.694768; 0.853488]
# Точка R:
тR := [X_R; y(X_R)] = [0.05; 0.142013]
# Точка D
тD := [X_D; y(X_D)] = [0.99; 0.996605]
# Все точки в сборке:
X_point_all := [тM[0]; тR[0]; тD[0]]
h_point_all := [тM[1]; тR[1]; тD[1]]
X_point := [тM[0]; тR[0]]
h_point := [тM[1]; тR[1]]
x := 0, 0.005 .. 1
# [area: Односекционная колонна]
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# [area: Двухсекционная колонна]
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