# Worksheet setting: ORIGIN = 1
# [reference: rfp2mcd(c) Release [mcd14].xmcd]
# Расчет абсорбера
# Техническое задание:
hfld_init(map) :=
    result ← ""
    result ← concat("C:\Rfp8\fluids\", map[1, 1]) if rows(map) == 1
    otherwise
        for i ∈ 1 .. rows(map)
            result ← concat(result, concat("C:\Rfp8\fluids\", map[i, 1], "|"))
# 1) Рассчитать насадочный абсорбер (определить высоту и диаметр) для очистки от СО_2 рабочего газа, абсорбент – вода.
# 2) Насадка: керамические кольца Рашига внавал
# а) 25 мм;
# б) 50 мм.
# 3) Сравнить высоту слоя насыпки из колец Рашига с высотой при использовании насадки другого типа.
x_init(map) :=
    result ← result ← [1] if rows(map) == 1
    otherwise
        for i ∈ 1 .. rows(map) - 1
            result[i] ← map[i, 3]
    result
# Исходные данные:
# Список компонентов и их концентрация в рабочем газе до очистки:
x_name(map) :=
    result ← result ← [1] if rows(map) == 1
    otherwise
        for i ∈ 1 .. rows(map) - 1
            result[i] ← map[i, 2]
    result
x_gase(map) :=
    result ← result ← [1] if rows(map) == 1
    otherwise
        for i ∈ 1 .. rows(map) - 1
            result[i] ← map[i, 3]
    result[rows(map)] ← 0
    result
components := ["HYDROGEN.FLD", "H2", 0.6; "NITROGEN.FLD", "N2", 0.2; "CO2.FLD", "CO2", 0.2; "WATER.FLD", "H2O", 1]  # >>> абсорбтив
# >>> абсорбент
# Инициализация библиотеки свойств:
# Число компонентов в очищаемом газе:
i := rows(components) = 4
Xpure(map, curN) :=
    result ← result ← [1] if rows(map) == 1
    otherwise
        for i ∈ 1 .. rows(map)
            result[i] ← 1 if i == curN
            result[i] ← 0 otherwise
    result
hfld := hfld_init(components)
hfld = "C:\Rfp8\fluids\HYDROGEN.FLD|C:\Rfp8\fluids\NITROGEN.FLD|C:\Rfp8\fluids\CO2.FLD|C:\Rfp8\fluids\WATER.FLD|"
x_tst := x_init(components) = [0.6; 0.2; 0.2]
x_n := x_name(components) = ["H2"; "N2"; "CO2"]
x_g := x_gase(components) = [0.6; 0.2; 0.2; 0]
ierr_SETUP(i, hfld, hfm, hrf) = 0
# Расчетная схема аппарата:
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Xsorb :=
    result ← result ← [1] if rows(components) == 1
    otherwise
        for i ∈ 1 .. rows(components)
            result[i] ← 1 if i == rows(components)
            result[i] ← 0 otherwise
    result
getFVal(p1, p2, f, curN) :=
    result ← ρ_Tpz(p1, p2, Xpure(components, curN))/(кг/м^3) if f == "rho"
    result ← μ_x(Xpure(components, curN))/(кг/моль) if f == "moleMass"
    result ← μ_Tdx(p1, ρ_Tpz(p1, p2, Xpure(components, curN)), Xpure(components, curN))/(Па*с) if f == "viscozity"
    result
getFCell(p1, p2, f) :=
    for i ∈ 1 .. rows(components) - 1
        result[i, 2] ← getFVal(p1, p2, f, i)
        result[i, 1] ← x_n[i]
    result
# Рисунок 1. Схема потоков в абсорбере
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# Рисунок 2. Схема потоков в  абсорберционной установке
# Начальная объемная (мольная) доля абсорбтива в очищаемом газе:
Y_1 := 0.2
regularL(val, map) :=
    result ← 0
    index ← 0
    for i ∈ 1 .. rows(map) - 1
        if val ≤ map[i + 1] and val ≥ map[i]
            index ← i
            result ← map[i + 1]
    if result ≠ 0
        δ1 ← |map[index + 1] - val|/max(val, map[index + 1])
        δ2 ← |map[index] - val|/max(val, map[index])
        result ← map[index + 1] if δ1 < δ2
        result ← map[index] otherwise
    result
# Конечная объемная (мольная) доля абсорбтива в газе:
Y_2 := 0.02
# Начальная объемная (мольная) относительная доля абсорбата в абсорбенте:
x_1 := 0
# Давление в системе:
p := 2*МПа
# Рабочая температура абсорбента:
T := 303 K
# Расход очищаемого газа:
G_0 := 16000*м^3/ч = 4444.44 л/с
# Коэффициент минимального удельного расхода (1.2...1.5):
k_l := 1.3
# Коэффициент скорости захлебывания (0.8...0.85):
k_w0 := 0.8
# Расчет
# Постоянная Авагадро:
k := 22.4*л/моль
# Мольный расход очищаемого газа:
G := G_0/k = 198.413 моль/с
# Плотности компонентов смеси по условиям процесса (УП), кг/м^3:
ρ_УП := getFCell(T, p, "rho") = ["H2", 1.58191; "N2", 22.29; "CO2", 38.8646]
# Плотность абсорбента по условиям процесса (УП):
ρ_l := ρ_Tpz(T, p, Xsorb) = 996.54 кг/м^3
# Молярные массы компонентов очищаемого газа, кг/моль:
M_УП := getFCell(T, p, "moleMass") = ["H2", 0.00201588; "N2", 0.0280135; "CO2", 0.0440098]
# Молярная масса абсорбента, кг/моль:
M_l := μ_x(Xsorb) = 0.0180153 кг/моль
# Расчет ведется в относительных молярных или массовых молях, т.е.:
y == Y/(1 - Y)
# Тогда начальная (1) и конечная (2) относительная мольная концентрация CO2 в абсорбенте соответсвенно, моль/моль:
y_1 := Y_1/(1 - Y_1) = 0.25
y_2 := Y_2/(1 - Y_2) = 0.0204082
# Параметры газовой смеси, кг/м^3:
ρ_g :=
    result ← 0
    for i ∈ 1 .. rows(components) - 1
        result ← result + x_tst[i]*ρ_УП[i, 2]
    result
    = 13.1801
# Уравнение материального баланса (по схеме аппарата, рис. 1):
# Обозначения:
# L - мольный расход абсорбента, моль/с;
# G - мольный расход очищаемого газа, моль/с
# M - мольный расход абсорбата через границу раздела фаз, моль/с
# Уравнения:
G*y_1 - M == G*y_2
L*x_1 + M == L*x_2
# Обозначим удельный расход абсорбента:
l' == L/G
# Уравнение прямых равновесия и рабочей:
# Согласно з-ну Генри при постоянной температуре парциальное давление p' растворенного вещества над его предельно разбавленным раствором пропорционально мольной доле этого вещества x или:
p'_CO2 == E*x_CO2  # (*)
# Здесь:
# p'_CO2 | - парциальное давление паров CO2 над зеркалом жикдкости
# x_CO2 | - мольная доля CO2 в воде
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E  # - константа Генри (определяется по таблице, см. табл.1)
# Таблица 1. Значение константы Генри, Па*моль/моль для различных веществ при различной температуре
# Для CO2 с учетом коэффициентов в таблице:
E_table := transpose([0.553, 0.666, 0.792, 0.93, 1.08, 1.24, 1.41, 1.77, 2.59])
T_table := transpose([0, 5, 10, 15, 20, 25, 30, 40, 60])
E_T' := cspline(T_table, E_table)
E(T_x) := interp(E_T', T_table, E_table, T_x/K)*133.3*МПа
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# Согласно следствию из закона Дальтона (давление смеси газов, химически не взаимодействующих между собой, равно сумме парциальных давлений каждого из компонентов смеси:)
p'_CO2 == p*Y'_CO2  # (**)
# Здесь:
# Y'_CO2 | - доля CO2 в газе после достижения равновесия
# Тогда из (*) и (**):
p*Y'_CO2 == E*x_CO2
Y'_CO2 == E/p*x_CO2
# Обозначим d == E/p как коэффициент распределения или константа фазового равновесия, тогда:
Y'_CO2 == d*x_CO2
# В данном расчете значения:
E := E(T - 273.15 K) = 187.259 МПа
d := E/p = 93.6293
# Закон Генри в относительных мольных концентрациях:
y'_CO2/(1 + y'_CO2) == d*x_CO2/(1 + x_CO2)
# или
y'_CO2 == d*x_CO2/(1 + x_CO2*(1 - d))  # (***)
# Здесь:
y'_CO2
# - относительная мольная концентрация CO2 в газе после достижения фазового равновесия
x_CO2
# - относительная мольная концентрация CO2 в жидкости после достижения фазового равновесия
# Если значение x_CO2 относительно мало, то знаменатель в уравнении (***) можно представить в виде линейной функции:
y'_CO2(x_CO2) := d*x_CO2
# Уравнение рабочей прямой (x_1 == 0) - в начальный момент времени в абсорбенте нет CO2:
y_CO2(x_CO2) == l'*x_CO2 + y_2
# Равновесная доля CO2 в абсорбенте в конце цикла (y'_CO2 == y_1)
x'_CO2 := y_1/d = 0.00267011
# Минимальный удельный расход абсорбента определяется из условия пересечения равновесной и рабочей прямых в точке x'_CO2:
l_min := (y_1 - y_2)/x'_CO2 = 85.9861
# С учетом коэффициента минимального удельного расхода:
l' := k_l*l_min = 111.782
# Конечная концентрация CO2 в сорбенте (абсорбат) при условии начальной нулевой концентрации:
x_2 := (y_1 - y_2)/l' = 0.00205393
# Концентрация СО2 в газе после достижения фазового равновесия:
y'_CO2(x_2) = 0.192308
# По уравнению рабочей прямой:
y_CO2(x_CO2) := l'*x_CO2 + y_2
y_CO2(x_2) = 0.25
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# Определение расходов
# - расход инертного газа (газа-носителя):
Q := G*(1 - y_1) = 148.81 моль/с
# - расход абсорбента:
L' := (y_1 - y_2)*G/(x_2 - x_1) = 22178.9 моль/с
L'_m := L'*M_l = 1438415 кг/ч
L'_V := L'_m/ρ_l = 1443409 л/ч
# Движущая сила процесса массопередачи:
Δy_1 := y_2 = 0.0204082
y'_CO2 := y'_CO2(x_2) = 0.192308
Δy_2 := y_1 - y'_CO2 = 0.0576923
# Средняя движущая сила:
Δy_ср := (Δy_1 - Δy_2)/ln(Δy_1/Δy_2) = 0.0358781
# Расчет скорости газа и диаметра абсорбера
# Предельная скорость (скорость захлебывания), м/с:
lg(w_0^2*a/(g*ε^3)*ρ_g/ρ_l*(μ_l/μ_w)^0.16) == A - B*(L'/G)^0.25*(ρ_g/ρ_l)^0.125
# Здесь:
# ε | - свободное сечение насадки, м^3/м^3 | μ_w | - вязкость абсорбента при 20 гр. Цельсия, Па*с
# a | - удельная поверхность насадки, м^2/м^3 | μ_l | - вязкость абсорбента при условиях сорбции, Па*с
# ρ_g | - плотность рабочего газа, кг/м^3 | g | - ускорение свободного падения, м^2/c
ρ_l
A, B  # - коэффициенты, определяются по таблице:
# - плотность абсорбента при условиях сорбции, кг/м^3
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# Область 1. Параметры насадок
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Data := [
    "Насадка", "a, м*м/м*м*м", "e, м*м*м/м*м*м*", "d.e", "rho, кг/м*м*м", "n в 1 м*м*м", "A", "B", "q_eff", "p", "q", "b";
    "Р_кер.к.Рашига_50x50x5", 110, 0.735, 0.027, 650, 8500, 0.062, 1.55, 0.022*10^-3, 0.0194, 0.0086, 173;
    "Р_кер.к.Рашига_80x80x8", 80, 0.72, 0.036, 670, 2200, 0.062, 1.55, 0.022*10^-3, 0.0087, 0.0113, 144;
    "Р_кер.к.Рашига_100x100x10", 60, 0.72, 0.048, 670, 1050, 0.062, 1.55, 0.022*10^-3, 0.0078, 0.0146, 119;
    "Н_кер.к.Рашига_25x25x3", 200, 0.74, 0.015, 530, 50000, -0.073, 1.75, 0.022*10^-3, 0.0367, 0.0086, 184;
    "Н_кер.к.Рашига_50x50x5", 90, 0.785, 0.035, 530, 6000, -0.073, 1.75, 0.022*10^-3, 0.024, 0.012, 169;
    "Н_ст.к.Рашига_25x25x0.8", 220, 0.92, 0.017, 640, 55000, -0.073, 1.75, 0.022*10^-3, 0.0367, 0.0086, 184;
    "Н_ст.к.Рашига_50x50x1", 110, 0.95, 0.035, 430, 7000, -0.073, 1.75, 0.022*10^-3, 0.024, 0.012, 169
]
# Обозначения в наименовании:
# Тип:
# P_ - регулярная насадка,
# Н_ - неупорядочная насадка,
# Материал:
# кер. - керамическая,
# ст. - стальная,
# Форма:
# к. - кольца
# [component: outputs Насадка]
# Коэффициенты:
A := Data[Насадка + 1, 7] = -0.073
B := Data[Насадка + 1, 8] = 1.75
# Параметры насадки:
# Удельная поверхность насадки:
a := Data[Насадка + 1, 2]*м^2/м^3 = 90 м^2/м^3
# Свободное сечение насадки:
ε := Data[Насадка + 1, 3] = 0.785
# Эквивалентный диаметр:
d_э := Data[Насадка + 1, 4]*м = 0.035 м
# Плотность насадки:
ρ_н := Data[Насадка + 1, 5]*кг/м^3 = 530 кг/м^3
# Эффективная линейная плотность орошения:
q_eff := Data[Насадка + 1, 9]*м^2/с = 2.2e-5 м^2/с
# Параметр p:
p_н := Data[Насадка + 1, 10]*м^2/с = 0.024 м^2/с
# Параметр q:
q_н := Data[Насадка + 1, 11]*м = 0.012 м
# Параметр b:
b_н := Data[Насадка + 1, 12] = 169
# Вязкость абсорбера при 20 гр. Цельсия:
T_20 := (20 + 273.15)*K = 293.15 K
ρ_l20 := ρ_Tpz(T_20, 1*бар, Xsorb) = 998.207 кг/м^3
# ? Не выводится верное значение динамической вязкости (REFPROP)
μ_w := 1.002*10^-3*Па*с
μ_l := 0.798*10^-3*Па*с
# Тогда:
w_0 := 0.1*м/с
Given
log(w_0^2*a/(g*ε^3)*ρ_g*кг/м^3/ρ_l*(μ_l/μ_w)^0.16) == A - B*(L'/G)^0.25*(ρ_g*кг/м^3/ρ_l)^0.125
w_0 := Find(w_0) = 0.0411916 м/с
# С учетом коэффициента скорости захлебывания:
w := k_w0*w_0 = 0.0329532 м/с
# Диаметр абсорбера при НУ (20 гр. Цельсия, 1 атм):
D' := sqrt(4*G_0*(T/(293 K))*(1*атм/p)/(π*w)) = 2.99948 м
# Нормальный ряд размеров (нефтеперерабатывающей промышленности):
map := transpose([1, 1.2, 1.4, 1.6, 1.8, 2, 2.2, 2.4, 2.6, 2.8, 3.0, 3.4, 3.6, 3.8, 4.0, 4.5, 5.0, 5.5, 6.0, 6.4, 7.0, 9.0])*м
# Тогда:
D_r := regularL(D', map) = 3 м
# Реальная скорость:
w_r := w*(D_r/D') = 0.032959 м/с
# Площадь поперечного сечения:
F_r := π*D_r^2/4 = 7.06858 м^2
# Плотность орошения:
U := L'_m/(ρ_l*F_r) = 0.0567224 м/с
# Скорость орошения:
q_l := U/a = 6.30249 см^2/с
# Эффективная линейная скорость орошения для выбранной насадки:
q_eff = 2.2e-5 м^2/с
# Минимальная плотность орошения для выбранной насадки:
U_min := a*q_eff = 0.00198 м/с
# Проверяем условие смачиваемости:
U_min < U = 1
# ! В случае недостаточной плотности орошения и неправильной организации подачи жидкости поверхность насадки может быть смочена не полностью, а часть смоченной поверхности практически не участвует в процессе массопередачи, для этого проводится проверка условия, при котором существует некоторая минимальная эффективная плотность орошения Umin, выше которой всю поверхность насадки можно считать смоченной. Поскольку условие выполняется, то в данном случае коэффициент смачиваемости насадки равен 1.
# Активная площадь насадки:
ψ_a := U*3600/(a*(p_н + q_н*U*3600)) = 0.916945
# Расчет критериев для ГАЗОВОЙ фазы
# ? Не выводится верное значение динамической вязкости, теплопроводности (REFPROP)
# Динамическая вязкость газовой смеси (получить из REFPROP или другого файла с газовой смесью):
ρ_g := ρ_g*кг/м^3
μ_g := 1.281*10^-5*Па*с
# Молярная масса газовой смеси:
M_g := μ_x(x_g) = 0.0156142 кг/моль
# Мольный объем газовой смеси:
υ_g := M_g/ρ_g = 0.00118468 м^3/моль
# Молярная масса абсорбтива:
M_CO2 := μ_x(Xpure(components, rows(components) - 1)) = 0.0440098 кг/моль
# Плотность абсорбтива:
ρ_CO2 := ρ_Tpz(T, p, Xpure(components, rows(components) - 1)) = 38.8646 кг/м^3
# Мольный объем абсорбтива:
υ_CO2 := M_CO2/ρ_CO2 = 0.00113239 м^3/моль
# Число Рейнольдса по газовой смеси:
Re_g := w_r*d_э*ρ_g/(ε*μ_g) = 1511.96
# Коэффициент диффузии CO2 в газе:
D_g := 4.3*10^-8*T^(3/2)/(p*(υ_CO2^(1/3) + υ_g^(1/3))^2)*sqrt(1/M_l + 1/M_g)/(s^2*K^1.5*mol^1.167/(m*mol^(10/3*10^-4)*kg^1.5))*м^2/с = 2.81038e-8 m^2/s
# Диффузионный критерий Прандтля:
Pr_dg := μ_g/(ρ_g*D_g) = 34.5833
# Диффузионный критерий Нуссельта:
Nu_dg := 0.407*Re_g^0.665*Pr_dg^0.33 = 170.535
# Тогда коэффициент массоотдачи от газовой смеси:
β_g := Nu_dg/d_э*D_g = 0.000136934 м/с
# Расчет критериев для ЖИДКОЙ фазы
# Молярная масса абсорбента:
M_l = 0.0180153 кг/моль
# Коэффициент, учитывающий ассоциацию молекул:
β := 1
# Коэффициент диффузии:
D_l := 7.4*10^-15*(β*M_l)^0.5*T/(μ_l*υ_CO2^0.6)*m^0.8*kg^0.5/(s*K*mol^0.1)*м^2/с = 2.20849e-8 м^2/с
# Диффузионный критерий Прандтля:
Pr_dl := μ_l/(ρ_l*D_l) = 36.2588
# Число Рейнольдса по абсорбенту:
Re_l := 4*U*ρ_l/(a*μ_l) = 3148.21
# Диффузионный критерий Нуссельта:
Nu_dl := 0.0021*Re_l^0.75*Pr_dl^0.5 = 5.31464
# С учетом:
Nu_dl == β_l*δ_f/D_l
# где
δ_f
# - приведенная толщина стекающей по насадке пленки жидкости:
δ_f := (μ_l^2/(ρ_l^2*g))^(1/3) = 4.0287e-5 м
# Тогда коэффициент массоотдачи к абсорбенту:
β_1 := Nu_dl/δ_f*D_l = 0.00291342 м/с
# С учетом плотности:
β_l' := β_1*ρ_l = 2.90334 кг/(с*м^2)
β_g' := β_g*ρ_g = 0.0018048 кг/(с*м^2)
# Тогда, массовый коэффициент массопередачи:
K_g := 1/(1/β_g' + 1/β_l') = 0.00180368 кг/(с*м^2)
# Мольный коэффициент массопередачи:
K_g_mole := K_g/M_g = 0.115516 моль/(с*м^2)
# Площадь массопередачи:
F_m := G*(y_1 - y_2)/(K_g_mole*Δy_ср) = 10991.5 м^2
# Расчетная высота насадки:
H_н := F_m/(0.785*a*D_r^2*ψ_a) = 18.852 м
# При большой высоте насадке, особенно при использовании насадки внавал, рекомендуется устанавливать перераспределители жидкости не реже, чем через 6м, тогда:
N_распр := Round(H_н/(6*м), 1) = 3
# Высота перераспределителя:
h_п := 0.4*м
# Высота насадочной части колонны:
Z := 6*м*H_н/(6*м - h_п) = 20.1986 м
# Расстояние до крышки абсорбера:
H_в := 0.8*D_r = 2.4 м
# Расстояние от дна до насадки:
H_н := 1.2*D_r = 3.6 м
# Полная высота абсорбера:
H_абс := H_в + Z + H_н = 26.1986 м
# Оценка гидравлического сопротивления насадки:
# - сопротивление сухого абсорбера:
ΔP_сух == λ*(H/d_э)*(w_r^2*ρ_g/2)
# Здесь:
λ
# -  коэффициент сопротивления, учитывающий суммарные потери давления на трение и местные  сопротивления насадки.
λ :=
    140/Re_g if Re_g < 40
    16/Re_g^0.2 otherwise
    = 3.70009
ΔP_сух := λ*(Z/d_э)*(w_r^2*ρ_g/2) = 15.2862 Па
# - сопротивление орошаемого абсорбера (ориентировочно - требуется уточнение зависимости параметра b от Uор):
# Плотность орошения (?):
ΔP_ор := 10^(b_н*U*с/м/10)*ΔP_сух = 0.138966 кПа
# Альтернативный расчет для насадки Mellapak
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# Форм-фактор:
F_fact := w_r*sqrt(ρ_g) = 0.119655 kg^(1/2)/(m^(1/2)*s)
F_fact/sqrt(Па) = 0.119655
n := (y_1 - y_2)/Δy_ср = 6.39922
H := 0.3*м*n = 1.91976 м
# Список источников
#
# 1. Основные процессы и аппараты химической технологии: Пособие по проектированию/Под ред. Ю.И. Дытнерского. -М.: Химия, 1983 - 272 с., ил.
