# [reference: rfp2mcd(c) Release [mcd14].xmcd]
# Техническое задание
# Рассчитать основные параметры пластинчато-ребристого двухпоточного теплообсенного аппарата.
i := 1
# Эскиз ТОА:
hfld := "C:\Rfp8\fluids\HELIUM.FLD"
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ierr_SETUP(i, hfld, hfm, hrf) = 0
# Прямой поток - ГЕЛИЙ.
# Температура на входе в ТОА  T_1 := 318.1 K
# Давление потока на входе  p_1 := 2.3*МПа
# Массовй расход  G_1 := 460*кг/ч
# Обратный поток - ГЕЛИЙ.
# Температура на входе в ТОА  T_2 := 75.98 K
# Давление потока на входе  p_2 := 0.1141*МПа
# Массовый расход  G_2 := 494.5*кг/ч
# Значение недорекуперации:
# ΔT := 4 K
#
# Коэффициент запаса по площади поверхности 20%, т.е.
# β := 1.2
# Средняя температура:
# T_ср := (T_1 + T_2)/2 = 197.04 K
# Для полученного значения по таблице свойств вещества определяем средние тепоемкости:
x_He := [1]
# прямого
Cp_ср1 := C_p_Tpz(T_ср, p_1, x_He) = 5.19863 кДж/(кг*К)
# обратного
Cp_ср2 := C_p_Tpz(T_ср, p_2, x_He) = 5.19346 кДж/(кг*К)
# Дополнительно. Разъяснение по выбору конца задания недорекуперации.
# Построим зависимость температуры в точке 3 от отношения водяных эквивалентов. Соотношение следует из теплового баланса аппарата:
Q_ОС + W_пр*(T_1 - T_3) == W_обр*(T_1 - ΔT - T_2)
T_3 == T_1 + Q_ОС/W_пр - W_обр/W_пр*(T_1 - ΔT - T_2)
T_3(λ) == T_1 + Q_ОС/W_пр - λ*(T_1 - ΔT - T_2)
# Условно зададим:
Q_ОС/W_пр == 5 K
# Тогда:
T_3(λ) := T_1 + 5 K - λ*(T_1 - ΔT - T_2)
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# Из графика следует, следующее: когда отношение водяных эквивалентов обратного и прямого потоков меньше 1 (водяной эквивалент прямого потока больше водяного эквивалента обратного потока) недорекуперацию следует задавать на теплом конце ТОА и наоборот, когда водяной эквивалент обратного потока больше водяного эквивалента прямого потока, недорекуперация задается на холодном конце.
# Из полученной закономерности также можно сделать вывод: в случае, когда водяной эквивалент прямого потока сильно больше водяного эквивалента обратного потока - обратный поток не может принять значительный тепловой поток, в результате чего возникает явление "засечка".
# 1. Определим водяные эквиваленты потоков:
# прямого
W_1 := G_1*Cp_ср1 = 0.664269 кВт/K
# обратного
W_2 := G_2*Cp_ср2 = 0.71338 кВт/K
# Недорекуперация на холодном конце теплооменника, т.к. W2>W1:
T_3 := T_2 + ΔT = 79.98 K
# Определим параметры рабочих веществ:
# Прямой поток:
T_1 = 318.1 K
T_3 = 79.98 K
h_1 := h_Tpz(T_1, p_1, x_He) = 1664.39 кДж/кг
h_3 := h_Tpz(T_3, p_1, x_He) = 425.242 кДж/кг
ρ_1 := ρ_Tpz(T_1, p_1, x_He) = 3.44635 кг/м^3
ρ_3 := ρ_Tpz(T_3, p_1, x_He) = 13.3352 кг/м^3
# Обратный поток:
T_2 = 75.98 K
h_2 := h_Tpz(T_2, p_2, x_He) = 400.012 кДж/кг
ρ_2 := ρ_Tpz(T_2, p_2, x_He) = 0.721551 кг/м^3
# Тепловой баланс ТОА:
G_1*h_1 + G_2*h_2 == G_1*h_3 + G_2*h_4
# Тогда энтальпия обратного потока:
h_4 := (G_1*h_1 + G_2*h_2 - G_1*h_3)/G_2 = 1552.71 кДж/кг
# Соответсвующая данной энтальпии плотность:
ρ_4 := ρ_phz(p_2, h_4, x_He) = 0.184277 кг/м^3
# Соответсвующая данной энтальпии температура
T_4 := T_phz(p_2, h_4, x_He) = 297.915 K
# Средняя температура прямого потока:
T_срПр := (T_1 + T_3)/2 = 199.04 K
# Средняя температура обратного потока:
T_срОбр := (T_2 + T_4)/2 = 186.947 K
# Теплофизические параметры, соответсвующие средней температуре:
# Плотности:
ρ_срПр := ρ_Tpz(T_срПр, p_1, x_He) = 5.47289 кг/м^3
ρ_срОбр := ρ_Tpz(T_срОбр, p_2, x_He) = 0.293561 кг/м^3
# Динамические вязкости:
μ_срПр := μ_Tdx(T_срПр, ρ_срПр, x_He) = 1.52553e-5 Па*с
μ_срОбр := μ_Tdx(T_срОбр, ρ_срОбр, x_He) = 1.44741e-5 Па*с
# Коэффициент теплопроводности:
λ_срПр := λ_Tdx(T_срПр, ρ_срПр, x_He) = 0.119359 Вт/(м*К)
λ_срОбр := λ_Tdx(T_срОбр, ρ_срОбр, x_He) = 0.112664 Вт/(м*К)
# Теплоемкости изобарные:
C_срПр := C_p_Tpz(T_срПр, p_1, x_He) = 5.19845 кДж/(кг*К)
C_срОбп := C_p_Tpz(T_срОбр, p_2, x_He) = 5.19352 кДж/(кг*К)
# Число Прандтля:
Pr_Пр := C_срПр*μ_срПр/λ_срПр = 0.664413
Pr_Обр := C_срОбп*μ_срОбр/λ_срОбр = 0.667218
# 2. Тепловой расчет
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# Геометрические характеристики поверхности:
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# тип поверхности: | 6/4
# - высота ребра:
l := 6*мм
# - толщина ребра:
δ_р := 0.15*мм
# - шаг ребра:
t := 4*мм
# - расстояние между прорезями:
Δ := 1.5*мм
# - эквивалентный диаметр:
d_э := 4.64*мм
# Компактность:
# - поверхность ребер:
S_СВ.Р := 520*м^2/м^3
# - поверхность проставок:
S_СВ.П := 342*м^2/м^3
# - по свободному объему:
S_СВ := 862*м^2/м^3
# Степень стеснения:
γ := 0.196
# Коэффициент оребрения:
ор := S_СВ.Р/S_СВ = 0.603248
# Задается:
# - толщина пластины:
δ_П := 0.5*мм
# - материал: сплав алюминия деформируемый
# - коэффициент теплопроводности материала проставок и ребер:
λ_П := 150*Вт/(м*K)
λ_Р := 150*Вт/(м*K)
# Тепловая нагрузка:
Q := G_2*C_срОбп*(T_4 - T_2) = 158.325 кВт
# Приняли, что теплообнные поверхности для прямого и обратного потоков одинаковые. Зададимся скоростью потока:
v_1 := 1.2*м/с
# Площадь свободного сечения:
Fcb_1 := G_1/(ρ_срПр*v_1) = 0.0194562 м^2
Fcb_2 := Fcb_1 = 0.0194562 м^2
# Скорость обратного потока:
v_2 := G_2/(Fcb_2*ρ_2) = 9.78452 м/с
# Числа Рейнольдса
Re_1 := v_1*ρ_срПр*d_э/μ_срПр = 1997.54
Re_2 := v_2*ρ_срОбр*d_э/μ_срОбр = 920.8
# Коэффициенты теплоотдачи находятся в зависимости от чесел Рейнольдса по таблице:
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A := 0.0088
n := 1.067
# фактор Колборна:
j_1 := A*Re_1^(n - 1) = 0.0146425
j_2 := A*Re_2^(n - 1) = 0.0139021
# коэффициенты теплоотдачи:
α_1 := j_1*ρ_срПр*v_1*C_срПр/Pr_Пр^(3/2) = 923.06 Вт/(K*м^2)
α_2 := j_2*ρ_срОбр*v_2*C_срОбп/Pr_Обр^(3/2) = 380.521 Вт/(K*м^2)
# Определение коэффициента теплопередачи
# Параметры ребра
m_1 := sqrt(2*α_1/(λ_Р*δ_р)) = 286.443 1/м
m_2 := sqrt(2*α_2/(λ_Р*δ_р)) = 183.913 1/м
# КПД ребра
η_p1 := tanh(m_1*l/2)/(m_1*l/2) = 0.809831
η_p2 := tanh(m_2*l/2)/(m_2*l/2) = 0.909528
# КПД оребренных поверхностей
η_1 := 1 - S_СВ.Р/S_СВ*(1 - η_p1) = 0.885281
η_2 := 1 - S_СВ.Р/S_СВ*(1 - η_p2) = 0.945423
# Коэффициент теплопередачи, отнесённый к поверхности прямого потока:
k_1 := (1/(α_1*η_1) + δ_П*S_СВ/(λ_П*S_СВ.П) + S_СВ*Fcb_1/(α_2*η_2*S_СВ*Fcb_2))^-1 = 249.263 Вт/(K*м^2)
# Средний температурный напор:
ΔT_CP := ((T_1 - T_4) - (T_3 - T_2))/ln((T_1 - T_4)/(T_3 - T_2)) = 9.99926 K
# Площадь поверхности теплообмена:
F_1 := Q/(k_1*ΔT_CP) = 63.522 м^2
# Основные геометрические характеристики:
# Свободный объём каналов по тёплому потоку:
V_CB1 := F_1/S_СВ = 0.0736914 м^3
# Высота теплообменника:
H := V_CB1/Fcb_1 = 3.78756 м
# Площадь полного поперечного сечения теплообменника:
F := 2*Fcb_1/(1 - γ) = 0.0483984 м^2
# Принимаем число каналов для каждого потока N_к := 8, высота канала h_k := 16*мм, тогда ширина канала без учета проставочных брусков:
L := F/(2*N_к*h_k) = 189.056 мм
# С учётом толщины разделительных пластин δ_П = 0.5 мм  ширина сечения пакета теплообменника:
(2*N_к*h_k + δ_П*(2*N_к + 1)) = 264.5 мм
L = 189.056 мм
# Гидравличекие сопротивления собственной поверхности теплообменника (для данных поверхностей по таблице:
B := 0.73
m := -0.32
# Фактор трения прямого потока:
f_1 := B*Re_1^m = 0.0641453
# гидравлическое  сопротивление:
Δp_1 := 4*f_1*ρ_срПр*v_1^2/2*H/d_э = 825.307 Па
# Фактор трения обратного потока:
f_2 := B*Re_2^m = 0.0821845
# гидравлическое  сопротивление:
Δp_2 := 4*f_2*ρ_срОбр*v_2^2/2*H/d_э = 3770.84 Па
