# [reference: rfp2mcd(c) Release [mcd14].xmcd]
i := 1
hfld := "C:\Rfp8\fluids\HELIUM.FLD"
hfm := "C:\Rfp8\fluids\HMX.BNC"
hrf := "DEF"
SETUP_RFP8(i, hfld, hfm, hrf)
x_пр := [1]
x_обр := [1]
ierr_SETUP(i, hfld, hfm, hrf) = 0
# ПРИЛОЖЕНИЕ Г.
# Методика расчета ТОА
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# Принятые обозначения:
#
# 1 - прямой поток (высокого давления)
# 2 - обратный поток (низкого давления)
# n - параметры потока на входе
# k - параметры потока на выходе
# m - среднее значение параметров
# Рис.1 Условная схема ТОА
# Исходные данные:
# 1. Из расчета цикла:
# Прямой (теплый)  Обратный (холодный)
# Теплоноситель  He  He
# Расход  G_1 := 460*кг/ч = 0.127778 кг/с  G_2 := 494.5*кг/ч = 0.137361 кг/с
# Температура на входе  T_1n := 318.1 K  T_2n := 75.98 K
# Температура на выходе  T_1k := 80 K  T_2k := 297.7 K
# Давление на входе  p_1n := 2.3*МПа  p_2n := 0.1141*МПа
# Давление на выходе  p_1k := 2.264*МПа  p_2k := 0.105*МПа
#
# 2. Недорекуперации:
# Недорекуперация на теплом конце:  ΔT_h := T_1n - T_2k = 20.4 K
# Недорекуперация на холодном конце:  ΔT_c := T_1k - T_2n = 4.02 K
#
# 3. Допустимые падения давлений:
# Падение давления в прямом потоке:  Δp_пр := p_1n - p_1k = 36 кПа
# Падение давления в обратном потоке:  Δp_обр := p_2n - p_2k = 9.1 кПа
#
# 4. Средняя температура потоков:
# T_1m := (T_1n + T_1k)/2 explicit, ALL → (318.1*K + 80*K)/2 = 199.05 K
#
# T_2m := (T_2k + T_2n)/2 explicit, ALL → (297.7*K + 75.98*K)/2 = 186.84 K
# 5. Среднее давление потоков:
# p_1m := (p_1n + p_1k)/2 explicit, p_1n, p_1k → (2.3*МПа + 2.264*МПа)/2 = 2.282 МПа
#
# p_2m := (p_2n + p_2k)/2 explicit, p_2n, p_2k → (0.1141*МПа + 0.105*МПа)/2 = 0.10955 МПа
#
# 6. Значение энтальпий потоков на входе и выходе из теплообменного аппарата:
# h_1n := h_Tpz(T_1n, p_1n, x_пр), h_1k := h_Tpz(T_1k, p_1k, x_пр)
# h_2n := h_Tpz(T_2n, p_2n, x_обр), h_2k := h_Tpz(T_2k, p_2k, x_обр)
# h_1n = 1664.39 кДж/кг, h_1k = 425.269 кДж/кг
# h_2n = 400.012 кДж/кг, h_2k = 1551.57 кДж/кг
# 7. Значение теплоемкостей потоков на входе и выходе из теплообменного аппарата:
#
# Cp_1n := C_p_Tpz(T_1n, p_1n, x_пр), Cp_1k := C_p_Tpz(T_1k, p_1k, x_пр)
# Cp_2n := C_p_Tpz(T_2n, p_2n, x_обр), Cp_2k := C_p_Tpz(T_2k, p_2k, x_обр)
# Cp_1n = 5.19353 кДж/(кг*K), Cp_1k = 5.24728 кДж/(кг*K)
# Cp_2n = 5.19665 кДж/(кг*K), Cp_2k = 5.19321 кДж/(кг*K)
# 8. Средняя удельная теплоемкость потоков:
# Cp_1m := (Cp_1n + Cp_1k)/2 = 5.22041 кДж/(кг*K)
# Cp_2m := (Cp_2n + Cp_2k)/2 = 5.19493 кДж/(кг*K)
# 9. Тепловой поток и Т-Q диаграмма теплооменного аппарата:
# Q_тп := G_1*(h_1n - h_1k) = 158.332 кВт
# Энтальпия обратного потока в сечениях:
Q := 0, Q_тп/100 .. Q_тп
h_2ki(Q) := Q/G_2 + h_2n
p_обрi(Q) := p_2n - Δp_обр/Q_тп*Q
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T_2i(Q) := T_phz(p_обрi(Q), h_2ki(Q), x_обр)
# Уравнение теплового баланса:
h_1n*G_1 + h_2n*G_2 == h_1k*G_1 + h_2k*G_2
# Энтальпия прямого потока в сечении:
h_1ki(Q) := (h_1n*G_1 + h_2n*G_2 - h_2ki(Q)*G_2)/G_1
p_прi(Q) := p_1n - Δp_пр/Q_тп*Q
T_1i(Q) := T_phz(p_прi(Q_тп - Q), h_1ki(Q_тп - Q), x_обр)
dT(Q) := T_1i(Q) - T_2i(Q)
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# Проверка граничных условий:
T_1i(0) = 80 K
T_2i(0) = 75.98 K
T_1i(Q_тп) = 318.1 K
T_2i(Q_тп) = 297.915 K
# 10. Температурный напор в сечениях:
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# 11. Средняя разность температур:
ΔT_m :=
    integral(dT(Q), Q = 0 .. Q_тп)/Q_тп if (|(Cp_1k - Cp_1n)/Cp_1n| > 0.05) or (|(Cp_2k - Cp_2n)/Cp_2n| > 0.05)
    ((T_1n - T_2k) + (T_1k - T_2n))/2 if 0.8 < (T_1n - T_2k)/(T_1k - T_2n) < 1.2
    ((T_1k - T_2n) - (T_1n - T_2k))/ln((T_1k - T_2n)/(T_1n - T_2k)) otherwise
# Условия:
|(Cp_1k - Cp_1n)/Cp_1n| > 0.05 = 0
|(Cp_2k - Cp_2n)/Cp_2n| > 0.05 = 0
(T_1n - T_2k)/(T_1k - T_2n) = 5.07463
# Средний температурный напор:
ΔT_m = 10.0846 K
# 12. Запас поверхности: Z := 1.3
# 13. Допускаемые потери давления в намотке: коэффициент (a=0.65...0.70) a := 0.65
ΔP_1' := a*Δp_пр = 23.4 кПа
ΔP_2' := a*Δp_обр = 5.915 кПа
# 14. Плотность при средней температуре для прямого и обратного потока:
ρ_1m := ρ_Tpz(T_1m, p_1m, x_пр)
ρ_2m := ρ_Tpz(T_2m, p_2m, x_обр)
ρ_1m = 5.43048 кг/м^3
ρ_2m = 0.282026 кг/м^3
# 15. Теплопроводность при средней температуре для прямого и обратного потока:
λ_1m := λ_Tdx(T_1m, ρ_1m, x_пр)
λ_2m := λ_Tdx(T_2m, ρ_2m, x_обр)
λ_1m = 0.119349 Вт/(м*K)
λ_2m = 0.112616 Вт/(м*K)
# 16. Динамическая вязкость при средней температуре для прямого и обратного потока:
μ_1m := μ_Tdx(T_1m, ρ_1m, x_пр)
μ_2m := μ_Tdx(T_2m, ρ_2m, x_обр)
μ_1m = 1.52545e-5 Па*с
μ_2m = 1.44681e-5 Па*с
# 17. Типоразмер теплообменной поверхности:
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# [component: outputs surface]
# Типоразмер
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# Рис.2 Параметры навивки
surface = 8
data := [
    "d.2", "d.1", "d.п", "t.1", "t.2", "d.э", "E1", "E2", "E3", "E4", "fi";
    1, 0.6, 0.16, 1.1, 1.25, 0.27, 0.335, 14530, 4872, 1.18, 3.36;
    1.5, 1.2, 0.25, 1.65, 1.85, 0.42, 0.33, 9424, 3100, 1.14, 2.54;
    2, 1.3, 0.335, 2.2, 2.5, 0.57, 0.338, 6965, 2358, 0.623, 3.25;
    3, 2.3, 0.5, 3.2, 3.65, 0.84, 0.319, 4764, 1520, 0.51, 2.52;
    3, 2.0, 0.8, 3.6, 4.1, 1.04, 0.373, 3830, 1430, 0.383, 3.46;
    3, 1.4, 0.8, 3.6, 4.1, 1.04, 0.373, 3830, 1430, 0.306, 4.94;
    4, 3.2, 0.8, 4.6, 5.1, 1.19, 0.346, 3360, 1165, 0.41, 2.76;
    5, 4.0, 0.8, 5.35, 6.1, 1.23, 0.303, 3247, 985, 0.35, 2.59;
    6, 5.0, 1, 6.5, 7.35, 1.92, 0.348, 2088, 726, 0.313, 2.31;
    7, 5.4, 1.2, 7.6, 8.65, 1.87, 0.322, 2133, 688, 0.228, 2.74;
    8, 6.0, 1.5, 8.85, 10.1, 2.1, 0.324, 1840, 595, 0.184, 2.85;
    10, 7.0, 1.6, 10.7, 12.2, 2.42, 0.3, 1650, 495, 0.137, 2.96
]
d_2 := data[surface, 0]*мм
d_п := data[surface, 2]*мм
t_2 := data[surface, 4]*мм
φ := data[surface, 10]
d_1 := data[surface, 1]*мм
t_1 := data[surface, 3]*мм
d_э := data[surface, 5]*мм
S_уд := data[surface, 6]
ψ := data[surface, 8]*м^2/м^3
M' := data[surface, 9]*м^2/кг
E_1 := data[surface, 6]
E_2 := data[surface, 7]*м^2/м^3
E_3 := data[surface, 8]*м^2/м^3
E_4 := data[surface, 9]*м^2/кг
# Параметры выбранной поверхности:
# Наружный диаметр трубы:
d_2 = 5 мм
# Коэффициент оребрения:
φ = 2.59
# Внутренний диаметр трубы:
d_1 = 4 мм
# Отношение площадей:
S_уд = 0.303
# Диаметр проволоки:
d_п = 0.8 мм
# Поперечный шаг намотки:
# Компактность:
ψ = 985 м^2/м^3
t_1 = 5.35 мм
# Продольный шаг намотки:
t_2 = 6.1 мм
# Эквивалентный диаметр:
# Приведененная масса:
M' = 0.35 м^2/кг
d_э = 1.23 мм
# I. Предварительный расчет
# I.1 Критерий Прандтля:
Pr_1 := μ_1m*Cp_1m/λ_1m = 0.667243
Pr_2 := μ_2m*Cp_2m/λ_2m = 0.667411
A_1 := 0.023*λ_1m/(Вт/(м*K))/(d_1/м)*Pr_1^0.33
A_2 := 0.168*λ_2m/(Вт/(м*K))/(d_э/м)*Pr_2^0.33
# I.2 Коэффициенты уравнения теплопередачи:
A_1 == 0.023*λ_1m/d_1*Pr_1^0.33
A_2 == 0.168*λ_2m/d_э*Pr_2^0.33
P_1 := Z*Q_тп/(8*φ*ρ_1m*ΔP_1'*ΔT_m*G_1)*(μ_1m/d_1)^3
P_2 := Z*Q_тп/(2*ρ_2m*ΔP_2'*ΔT_m*G_2)*(μ_2m/d_э)^3
A_1 = 0.600482
A_2 = 13.4602
P_1 := Z*Q_тп/Вт/(8*φ*ρ_1m/(кг/м^3)*ΔP_1'/Па*ΔT_m/K*G_1/(кг/с))*(μ_1m/(Па*с)/(d_1/м))^3  # disabled
P_1 == Z*Q_тп/(8*φ*ρ_1m*ΔP_1'*ΔT_m*G_1)*(μ_1m/d_1)^3
P_2 == Z*Q_тп/(2*ρ_2m*ΔP_2'*ΔT_m*G_2)*(μ_2m/d_э)^3
P_2 := Z*Q_тп/Вт/(2*ρ_2m/(кг/м^3)*ΔP_2'/Па*ΔT_m/K*G_2/(кг/с))*(μ_2m/(Па*с)/(d_э/м))^3  # disabled
P_2 = 7.24832e-5 Вт/(м^2*K)
P_1 = 3.36488e-9 Вт/(м^2*K)
# I.2.1 Граничные значения коэффециента теплоотдачи:
# 1. По трубному потоку:
g_1 := 3.3856*10^8*P_1 = 1.13921 Вт/(м^2*K)
# при
Re_1 := 2300
# 2. По межтрубному потоку:
g_21 := 15.05*10^3*P_2 = 1.09087 Вт/(м^2*K)
# при
Re_21 := 20
g_22 := 6.656*10^5*P_2 = 48.2448 Вт/(м^2*K)
# при
Re_22 := 100
# 3. Критериальные коэффициенты в зависимости от гидравлического сопротивления:
# трубный поток | межтрубный поток
S_1(k) :=
    [64; -1] if k ≤ g_1
    [0.3164; -0.25] otherwise
S_2(k) :=
    [12.8; -0.64] if g_21 ≤ k ≤ g_22
    [2.65; -0.3] otherwise
B_2(k) := S_2(k)[0]
B_1(k) := S_1(k)[0]
x_1(k) := S_1(k)[1]
x_2(k) := S_2(k)[1]
Re_1(k) := (k/(B_1(k)*P_1))^(1/(x_1(k) + 3))
Re_2(k) := (k/(B_2(k)*P_2))^(1/(x_2(k) + 3))
ζ_1(k) := B_1(k)*Re_1(k)^x_1(k)
f_2(k) := B_2(k)*Re_2(k)^x_2(k)
# I.3 Число Нуссельта и Стантона:
St_2(k) := 0.168*Re_2(k)^-0.3*Pr_2^-0.66
St_2(g_22) = 0.0551719
Nu_1(k) :=
    Re_1' ← Re_1(k)
    3.66 if Re_1' ≤ 2300
    (3.66*(Re_1'/2300)^(2.3 + log(Pr_1))) if 2300 < Re_1' ≤ 4000
    (0.023*Re_1'^0.8*Pr_1^0.33) if 4000 < Re_1' ≤ 10^5
    "null" otherwise
Nu_1(g_1) = 3.66
# Массовые скорости потоков:
# трубный поток | межтрубный поток
w_1(k) := Re_1(k)*μ_1m/d_1
w_2(k) := Re_2(k)*μ_2m/d_э
# Коэффициент теплоотдачи:
α_2(k) := St_2(k)*w_2(k)*Cp_2m
α_1(k) := Nu_1(k)*λ_1m/d_1
α_1(g_1) = 109.204 Вт/(м^2*K)
α_2(g_22) = 335.824 Вт/(м^2*K)
# Коэффициент теплопередачи:
F(k) := k/α_2(k) + k*φ/α_1(k) - 1
F(g_22) = -0.691047
F(g_21) = -0.964133
F(g_21) < 1 = 1
# Корень уравнения:
k' := root(F(k), k, g_21, 1000*Вт/(м^2*K)) = 244.785 Вт/(м^2*K)
# Коэффициент теплоотдачи:
α_1(k') = 1212.52 Вт/(м^2*K)
α_2(k') = 513.042 Вт/(м^2*K)
# Факторы трения Дарси:
ζ_1(k') = 0.0293336
f_2(k') = 0.555749
# Число Нуссельта и Стантена:
Nu_1(k') = 40.6376
St_2(k') = 0.046009
# II. Расчет геометрических и конструктивных параметров намотки теплообенного аппарата
# II.1 Действительная площадь поверхности ТОА:
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F_д := Z*Q_тп/(k'*ΔT_m) = 83.381 м^2
# II.2 Критерий Рейнольдса:
# трубный поток | межтрубный поток
Re_1(k') = 13535.8
Re_2(k') = 182.483
# II.3 Массовые скорости потоков:
w_1(k') = 51.6205 кг/(м^2*с)
w_2(k') = 2.1465 кг/(м^2*с)
w_1(k')/ρ_1m = 9.5057 м/с
w_2(k')/ρ_2m = 7.611 м/с
# II.4 Число труб:
n'_тр := G_1/(π/4*d_1^2*w_1(k')) = 196.981
n_тр := ceil(n'_тр) = 197
n_тр'(n) :=
    (i ← 1)
    n_расч ← 0
    while n_расч ≤ n
        n_расч ← n_расч + i*6
        i ← i + 1
    [n_расч + 1; 2*i - 2; i]
n_тр'(n_тр) = [217; 16; 9]
# Число труб на главной диагонали:
n_диаг := n_тр'(n_тр)[1] = 16
# Оценка патрубка для размещения вводного пучка:
2*n_диаг*d_1 = 128 мм
d_1 = 4 мм
# II.5 Средняя длина одной трубы:
L_1тр := F_д/(φ*π*d_1*n_тр) = 13.0044 м
# II.6 Площадь среднего сечения свободного объема намотки:
S_2 := G_2/w_2(k') = 0.0639931 м^2
# II.7 Площадь фронтального сечения:
S_ф := S_2/E_1 = 0.211198 м^2
E_1 = 0.303
# II.8 Высота навивки:
H_нав := F_д/(S_2*E_2) = 401.284 мм
F_д/(ψ*S_ф) = 400.811 мм
E_2 = 3247 1/m
# II.9 Число рядов труб по высотк намотки:
n_p := (H_нав - (d_2 + 2*d_п))/t_2 + 1 = 65.7022
# II.10 Наружный диаметр намотки:
# Диаметр сердечника:
D_с := 20*d_2 = 100 мм
D := sqrt(S_ф/(π/4) + D_с^2) = 528.116 мм
# II.11 Средний диаметр намотки:
D_ср := (D + D_с)/2 = 314.058 мм
# II.12 Средняя относительная кривизна труб в намотке:
A_тр := d_1/D_ср = 0.0127365
# II.13 Число слоев труб в намотке:
m'_тр := (0.5*(D - D_с) - d_2 - 2*d_п)/t_1 + 1 = 39.7772
m_тр := ceil(m'_тр) = 40
# II.14 Объем навивки:
V_нав := F_д/E_3 = 0.0846507 м^3
# II.15 Масса навивки:
E_3 = 985 1/m
M_нав := F_д/E_4 = 238.231 кг
E_4 = 0.35 m^2/kg
# II.16 Гидравлическое сопротивление:
Δp'_1 := ζ_1(k')*w_1(k')^2/(2*ρ_1m)*L_1тр/d_1
Δp'_1 = 23397.7 Па
(Δp_пр - Δp'_1)/Δp_пр = 0.350064
Δp_пр = 36 кПа
Δp'_2 := f_2(k')*w_2(k')^2/(2*ρ_2m)*F_д/S_2
Δp'_2 = 5915 Па
(Δp_обр - Δp'_2)/Δp_обр = 35 %
Δp_обр = 9.1 кПа
# III. Уточненный расчет геометрических и конструктивных параметров намотки теплообенного аппарата
# Уточняем количество труб в намотке, для заполнения трубной решетки:
n''_тр := n_тр'(n_тр)[0]
n''_тр = 217
# Количество слоев навивки:
m''_тр := round(n_тр/n''_тр*m_тр) = 36
# 1. Наружный диаметр намотки:
D'' := D_с + 2*(m''_тр - 1)*t_1 + 2*(d_2 + 2*d_п) = 487.7 мм
# 2. Средний диаметр намотки:
D''_ср := (D'' + D_с)/2 = 293.85 мм
# 3. Средняя относительная кривизна труб в намотке:
A''_тр := d_1/D''_ср = 0.0136124
# 4. Площадь фронтального сечения:
S''_ф := π/4*(D''^2 - D_с^2) = 0.178954 м^2
# 5. Площадь среднего сечения свободного объёма:
S''_2 := S''_ф*E_1 = 0.0542231 м^2
# 6. Массовая скорость межтрубного потока:
w''_2 := G_2/S''_2 = 2.53326 кг/(м^2*с)
# 7. Критерий Рейнольдса:
Re''_2 := w''_2*d_э/μ_2m = 215.364
# 8. Критерий Прандтля:
Pr_2 = 0.667411
# 9. Критерий Стантона:
St''_2 := 0.168*Re''_2^-0.3/Pr_2^0.66 = 0.0437782
# 10. Коэффициент теплоотачи в межтрубном пространстве:
α''_2 := St''_2*w''_2*Cp_2m = 576.126 Вт/(м^2*K)
# 11. Площадь сечения труб:
S''_1 := π*d_1^2/4*n''_тр = 0.0027269 м^2
# 12. Массовая скорость трубного потока:
w''_1 := G_1/S''_1 = 46.8582 кг/(м^2*с)
# 13. Критерий Рейнольдса:
Re''_1 := w''_1*d_1/μ_1m = 12287
# 14. Критерий Прандтля:
Pr_1 = 0.667243
# 15. Критерий Нуссельта:
A''_тр > 2*10^-3 = 1  # необходимо учесть кривизну при расчете сопротивления и числа Нуссельта
a_1 := 0.023
a_2 := 3.65
b_2 := 0.2903
b_1 := 14.8
R := 2.2*10^4
Nu_1k(Re1, A_тр) :=
    Re_к ← 2300*(1 + 8.6*A_тр^0.45)
    (a_2 + 0.08*(1 + 0.8*A_тр^0.9)*Re1^(0.5 + b_2*A_тр^0.194)*Pr_1^(1/3)) if 100 < Re1 ≤ Re_к
    (a_1*(1 + 14.8*(1 + A_тр)*A_тр^(1/3))*Re1^(0.8 - 0.22*A_тр^0.1)*Pr_1^(1/3)) if Re_к < Re1 < R
    (a_1*(1 + 3.6*(1 - A_тр)*A_тр^0.8)*Re1^0.8*Pr_1^(1/3)) if R < Re1 < 1.5*10^5
Nu''_1 := Nu_1k(Re''_1, A''_тр) = 44.7013
# 16. Коэффициент теплоотдачи в трубном пространстве:
α''_1 := Nu''_1*λ_1m/d_1 = 1333.76 Вт/(м^2*K)
# 17. Коэффициент теплопередачи:
k'' := 1/(φ/α''_1 + 1/α''_2) = 271.916 Вт/(м^2*K)
# 18. Необходимая площадь поверхности теплообмена:
F''_н := Q_тп/(k''*ΔT_m) = 57.7396 м^2
# 19. Действительная площадь поверхности теплообмена:
F''_д := Z*F''_н = 75.0615 м^2
# 20. Высота намотки:
H''_нав := F''_д/(S''_2*E_2) = 426.335 мм
F''_д/(ψ*S''_ф) = 425.833 мм
# 21. Число рядов труб по высоте намотки:
n''_p := (H''_нав - (d_2 + 2*d_п))/t_2 + 1 = 69.809
# 22. Средняя длина одной трубы:
L''_1тр := F''_д/(φ*π*d_1*n''_тр) = 10.6279 м
# 23. Объем навивки:
V''_нав := F''_д/E_3 = 76.2046 л
# 24. Масса навивки:
M''_нав := F''_д/E_4 = 214.461 кг
# 25. Коэффициент сопротивления в трубах:
A''_тр > 2*10^-3 = 1  # необходимо учесть кривизну при расчете сопротивления и числа Нуссельта
ζ_1k(Re1, A_тр) :=
    Re_к ← 2300*(1 + 8.6*A_тр^0.45)
    (1 + 0.14*A_тр^0.97*Re1^(1 - 0.644*A_тр^0.312))*64/Re1 if 100 < Re1 ≤ Re_к
    (1 + 2.88*10^4*A_тр^0.62/Re1)*0.3164/Re1^0.25 if Re_к < Re1 < 2.2*10^4
    (1 + 0.0823*(1 + A_тр)*A_тр^0.53*Re1^0.25)*0.3164/Re1^0.25 if 2.2*10^4 < Re1 < 1.5*10^5
ζ''_1 := ζ_1k(Re''_1, A''_тр) = 0.0349596
# 26. Гидравлическое сопротивление по трубному потоку:
Δp''_1 := ζ''_1*w''_1^2/(2*ρ_1m)*L''_1тр/d_1
Δp''_1 = 18.7784 кПа
(Δp_пр - Δp''_1)/Δp_пр = 47.8379 %
Δp_пр = 36 кПа
# 27. Коэффициент сопротивления в межтрубном пространстве:
f_2(Re2) :=
    (12.8*Re2^-0.64) if 40 ≤ Re2 ≤ 100
    (2.65*Re2^-0.3) if 100 < Re2 < 4000
    f_2(k') otherwise
f''_2 := f_2(Re''_2) = 0.528803
# 28. Гидравлическое сопротивление по межтрубному пространству:
Δp''_2 := f''_2*w''_2^2/(2*ρ_2m)*F''_д/S''_2
Δp''_2 = 8.32853 кПа
(Δp_обр - Δp''_2)/Δp_обр = 8.47771 %
Δp_обр = 9.1 кПа
# Распределние трубок по слоям теплообменника
# Средний диаметр слоя:
D_слоя(j) := D_с + d_2 + 2*d_п + 2*t_1*(j - 1)
# Наружный диаметр слоя:
D_н(j) := D_с + 2*d_2 + 2*d_п + 2*t_1*(j - 1)
# Расчетное число трубок в слое:
i(j) := round(n''_тр/m''_тр*D_слоя(j)/D''_ср)
# Число витков одной трубки в слое:
n_тр_сл(j) := n''_p/i(j)
n''_p = 69.809
# Длина витка трубки в слое:
l_тр_сл(j) := sqrt((π*D_слоя(j))^2 + (i(j)*t_2)^2)
# Длина одной трубки в слое:
l(j) := l_тр_сл(j)*n_тр_сл(j)
j := 1 .. m''_тр
m''_тр = 36
D_слоя(j) = [
    106.6; 117.3; 128; 138.7; 149.4; 160.1; 170.8; 181.5; 192.2; 202.9
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] мм
n_тр_сл(j) = [
    34.9045; 34.9045; 23.2697; 23.2697; 23.2697; 23.2697; 17.4523; 17.4523; 17.4523; 17.4523
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]
l_тр_сл(j) = [
    335.116; 368.711; 402.54; 436.123; 469.711; 503.302; 537.139; 570.721; 604.307; 637.896
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] мм
i(j) = [
    2; 2; 3; 3; 3; 3; 4; 4; 4; 4
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]
l(j) = [
    11.6971; 12.8697; 9.36697; 10.1484; 10.93; 11.7117; 9.37428; 9.96037; 10.5465; 11.1327
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] м
D_н(j) = [
    111.6; 122.3; 133; 143.7; 154.4; 165.1; 175.8; 186.5; 197.2; 207.9
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] мм
sum(i(j), j) = 217
sum(i(j)*l(j), j) = 2321.85 м
