# [reference: rfp2mcd(c) Release [mcd14].xmcd]
x_tst := [1]
i := 1
# Зададимся начальными параметрами:
hfld := "C:\Rfp8\fluids\HELIUM.FLD"
ierr_SETUP(i, hfld, hfm, hrf) = 0
# Температура He на входе в ванну
T_He_вх := 177.9 K
# Недорекуперация на холодном конце
ΔT_2 := 5.18*K
# Температура жидкого азота
T_N2 := 79.18 K
# Температурный напор максимальный
ΔT_1 := T_He_вх - T_N2 = 98.72 K
# Температура He на выходе из ванны
T_He_вых := T_N2 + ΔT_2 = 84.36 K
# Температурный напор средний
τ_m := (ΔT_1 - ΔT_2)/ln(ΔT_1/ΔT_2) = 31.7356 K
T_N2_вх := 79.2 K
T_N2_вых := 79.2 K
G_He := 180*кг/ч
# Параметры потоков:
# Сжатый гелий | Азот
# Давление
p_He := 2*МПа
p_N2 := 0.125*МПа
T_N2_ср := (T_N2_вых + T_N2_вх)/2 = 79.2 K
# Температура
T_He_ср := (T_He_вх + T_He_вых)/2 = 131.13 K
C_pHe := C_p_Tpz(T_He_ср, p_He, x_tst) = 5.20847 кДж/(кг*K)
# Теплоемкость
C_pHe = 5.20847 кДж/(кг*К)
C_pN2 := 2.014*кДж/(кг*К)
ν_He := 1/ρ_Tpz(T_He_ср, p_He, x_tst) = 0.139133 м^3/кг
1/ρ_Tpz(T_He_ср, p_He, x_tst) = 0.139133 m^3/kg
C_pN2 = 0.481358 ккал/(кг*K)
C_pHe = 1.24486 ккал/(кг*K)
μ_N2 := 2.205*10^-4*Па*с
μ_He := μ_Tdx(T_He_ср, ρ_Tpz(T_He_ср, p_He, x_tst), x_tst) = 1.16424e-5 Па*с
ν_N2 := 0.001192*м^3/кг
# Удельный объем
ν_He = 0.139133 м^3/кг
кГ := kgf
λ_He := λ_Tdx(T_He_ср, ρ_Tpz(T_He_ср, p_He, x_tst), x_tst) = 0.0902628 Вт/(м*K)
# Теплота
# парообразования
r := 48*ккал/кг = 200.832 кДж/кг
λ_N2 := 0.16*Вт/(м*К)
# Динамическая
# вязкость
μ_He = 1.1872e-6 кГ*с/м^2
μ_N2 = 2.24847e-5 кГ*с/м^2
μ_He = 1.16424e-5 Па*с
μ_N2 = 0.0002205 Па*с
# Теплопроводность
λ_He = 0.0902628 Вт/(м*K)
λ_N2 = 0.16 Вт/(м*К)
λ_He = 0.0776639 ккал/(м*K*ч)
λ_N2 = 0.137667 ккал/(м*K*ч)
σ_N2 := 0.011*Н*м
# Поверхностное
# натяжение
σ_N2 = 0.00112169 кГ*м
# Параметры трубок
d_вн := 16*мм
δ := 1*мм
D_зм := 0.48*м
d_н := d_вн + 2*δ
# Расчет I
γ_1 := 1/0.001192
γ_2 := 1/1.3
α_N2 == 6.9*10^-3*(γ_2*48/(γ_1*γ_2))^(1/30)*(γ_1/(1.12*10^-3))^(1/3)*0.138^0.75*qqq^0.7/((2.25*10^-5)^0.45*0.48^(7/60)*80.1^0.37)
A_1 := 6.9*10^-3*(γ_2*48/(γ_1*γ_2))^(1/30)*(γ_1/(1.12*10^-3))^(1/3)*0.138^0.75/((2.25*10^-5)^0.45*0.48^(7/60)*79.2^0.37) = 3.44103
α_N2 == A_1*qqq^0.7
# Число змеевиков, заходностей
n_зм := 5
# Скорость потока в трубках
ω := 4*G_He*ν_He/(n_зм*π*d_вн^2) = 6.91989 м/с
# Критерий Рейнольдса
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Re := ω*d_вн/(μ_He*ν_He) = 68351.3
# Критерий Прандтля
Pr := μ_He*C_pHe/λ_He = 0.671808
# Критерий Нуссельта
Nu := 0.023*Re^0.8*Pr^0.4 = 144.685
# Коэфф. теплоотдачи
α_He := Nu*λ_He/d_вн = 816.229 Вт/(м^2*K)
α_He = 702.3 ккал/(м^2*K*ч)
q_кр := 1.7*10^4*0.138^0.5*(γ_1 - γ_2)^(13/24)*(γ_2*48*80.1)^(1/3)*(1.12*10^-3)^(1/24)/(γ_1^(5/12)*0.48^(1/6))*ккал/(м^2*ч) = 178975 ккал/(м^2*ч)
q_кр = 208009 Вт/м^2
q_He(ΔT1) := α_He*ΔT1*K
q_N2(ΔT2) := (A_1*ΔT2)^(1/0.3)*ккал/(м^2*ч)
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X := 20
Given
Q := 25.61*кВт = 22035.4 ккал/ч
q_N2(τ_m/K - X) == q_He(X)
ΔT_1 := Find(X)*K = 26.2048 K
ΔT_2 := τ_m - ΔT_1 = 5.53073 K
q_He(ΔT_1/K) = 18403.7 ккал/(м^2*ч)
q_N2(ΔT_2/K) = 18403.7 ккал/(м^2*ч)
q_He(ΔT_1/K) = 21389.1 Вт/м^2
Q_кк := Q/(ккал/ч) = 22035.4
q_кк := q_He(ΔT_1/K)/(ккал/(м^2*ч)) = 18403.7  # ккал/(м^2*ч)
d_н_кк := d_н/м = 0.018
# Коэффициент теплоотдачи от стенки к кипящему азоту
α_N2 := A_1*q_кк^0.7*ккал/(м^2*K*ч) = 3327.53 ккал/(м^2*K*ч)
α_N2 = 3867.33 Вт/(м^2*K)
l := Q_кк/(n_зм*q_кк*π*d_н_кк) = 4.23471  # м  # с учетом запаса
L := 1.5*l*м = 6.35207 м
# Число витков:
n_в := L/(π*D_зм) = 4.21235
n_в := 4.5
# высота одного змеевика:
H_i := n_в*d_н = 0.081 м
# Зазор между трубками
δ_тр := 3*мм
# Высота всего змеевика:
H_Σ := H_i*n_зм + δ_тр*n_в*n_зм = 0.4725 м
# Потери напора в змеевике
# Коэффициент Дарси:
ζ := 1/(1.82*log(Re) - 1.64)^2 = 0.0195104
ΔP := ζ*ω^2/(2*ν_He)*7*м/d_вн = 1.46887 кПа
k := 1/(1/α_He + 1/α_N2) = 579.907 ккал/(м^2*ч*K)
k = 673.98 Вт/(м^2*K)
F := Q/(n_зм*k*τ_m) = 0.239467 м^2
n_зм = 5
l := F/(π*d_вн) = 4.76405 м
L := l*1.5 = 7.14608 m
n_в := L/(π*D_зм) = 4.73889
n_в := 4.8
H_i := n_в*d_н = 0.0864 м
H_Σ := H_i*n_зм + 2*δ_тр*n_в*n_зм = 0.576 м
# Поверочный расчет на режиме реконденсации
# Нагрузка
Q_qqq := 24822*кДж/ч = 6.895 кВт
# Удельный тепловой поток
qqq := Q_qqq/(м*n_зм*π*d_н_кк*L) = 2936.2 ккал/(м^2*ч)
T_He_вх := 109.3 K
ΔT_2 := 5.18*K
T_He_вых := T_N2 + ΔT_2 = 84.36 K
# Параметры потоков:
# Сжатый гелий
# Температура
T_He_ср := (T_He_вх + T_He_вых)/2 = 96.83 K
C_pHe := C_p_Tpz(T_He_ср, p_He, x_tst) = 5.22485 кДж/(кг*K)
# Теплоемкость
C_pHe = 5.22485 кДж/(кг*К)
C_pHe = 1.24877 ккал/(кг*K)
ΔT_1 := T_He_вх - T_N2 = 30.12 K
τ_m := (ΔT_1 - ΔT_2)/ln(ΔT_1/ΔT_2) = 14.1674 K
ν_He := 1/ρ_Tpz(T_He_ср, p_He, x_tst) = 0.103417 м^3/кг
1/ρ_Tpz(T_He_ср, p_He, x_tst) = 0.103417 m^3/kg
# Удельный объем
ν_He = 0.103417 м^3/кг
μ_He := μ_Tdx(T_He_ср, ρ_Tpz(T_He_ср, p_He, x_tst), x_tst) = 9.82502e-6 Па*с
# Динамическая
# вязкость
μ_He = 1.00187e-6 кГ*с/м^2
μ_He = 9.82502e-6 Па*с
λ_He := λ_Tdx(T_He_ср, ρ_Tpz(T_He_ср, p_He, x_tst), x_tst) = 0.0742164 Вт/(м*K)
# Теплопроводность
λ_He = 0.0742164 Вт/(м*K)
λ_He = 0.0638574 ккал/(м*K*ч)
# Скорость потока в трубках
ω := 4*G_He*ν_He/(n_зм*π*d_вн^2) = 5.14354 м/с
# Критерий Рейнольдса
Re := ω*d_вн/(μ_He*ν_He) = 80994.7
# Критерий Прандтля
Pr := μ_He*C_pHe/λ_He = 0.691684
# Критерий Нуссельта
Nu := 0.023*Re^0.8*Pr^0.4 = 167.67
# Коэфф. теплоотдачи
α_He := Nu*λ_He/d_вн = 777.743 Вт/(м^2*K)
α_He = 669.186 ккал/(м^2*K*ч)
q_He(ΔT1) := α_He*ΔT1*K
q_He(XX) := α_He*XX*K
q_N2(ΔT2) := (A_1*ΔT2)^(1/0.3)*ккал/(м^2*ч)
H := 5
H1 := 8
Given
q_He(H) == qqq
q_N2(H1 - H) == qqq
Δ := Find(H, H1) = [4.38771; 7.57665]
τ_m := Δ[1]*K = 7.57665 K
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ΔT_1 := T_He_вх - T_N2 = 30.12 K
qqq = 3412.51 Вт/м^2
Given
X := 2
(ΔT_1 - X*K)/ln(ΔT_1/(X*K)) == τ_m
ΔT_2 := Find(X)*K = 0.613077 K
T_He_вых := T_N2 + ΔT_2 = 79.7931 K
# Второй способ
α_N2 := A_1*(qqq/(ккал/(м^2*ч)))^0.7*ккал/(м^2*K*ч) = 920.743 ккал/(м^2*K*ч)
α_N2 = 1070.11 Вт/(м^2*K)
k_пр := 1/(1/α_He + 1/α_N2) = 387.532 ккал/(м^2*ч*K)
3.6*(qqq/(Вт/м^2))^0.7 = 1070.17
α_He = 0.777743 кВт/(м^2*K)
τ_m_пр := Q_qqq/(n_зм*k_пр*F) = 12.7856 K
k_пр = 450.398 Вт/(м^2*K)
Given
X := 2
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(ΔT_1 - X*K)/ln(ΔT_1/(X*K)) == τ_m_пр
ΔT_2_пр := Find(X)*K = 3.86359 K
T_N2 = 79.18 K
T_He_вых := T_N2 + ΔT_2_пр = 83.0436 K
# Двухслойный змеевик
D_внутре_зм := 0.4*м
Hн := 1*м
Lв := 1*м
Hв := 1*м
Lн := 1*м
Given
Lн + Lв == L
Hн == Lн/(π*D_зм)*d_н*n_зм + 2*δ_тр*Lн/(π*D_зм)*n_зм
Hв == (L - Lн)/(π*D_внутре_зм)*d_н*n_зм + 2*δ_тр*(L - Lн)/(π*D_внутре_зм)*n_зм
Hн == Hв
Find(Lн, Hн, Lв, Hв) = [3.89786; 0.310182; 3.24822; 0.310182] m
n_в := L/(π*D_зм) = 4.73889
H_i := n_в*d_н = 0.0853 м
H_Σ := H_i*n_зм + 2*δ_тр*n_в*n_зм = 0.568667 м
