# [reference: rfp2mcd(c) Release [mcd14].xmcd]
# Задание смеси:
hfld1 := "C:\Rfp8\fluids\HELIUM.FLD|"
hfld2 := "C:\Rfp8\fluids\ARGON.FLD|"
hfld3 := "C:\Rfp8\fluids\METHANE.FLD|"
hfld := concat(hfld1, hfld2, hfld3)
i := 3
ierr_SETUP(i, hfld, hfm, hrf) = 0
get_Z(T, p, X) := z_Tdx(T, ρ_Tpz(T, p, X), X)
X_C1 := [1; 0; 0]
X_C2 := [0; 1; 0]
X_C3 := [0; 0; 1]
p := 1 .. 500
T_0 := 293 K
# Зависимость величины обратной сжимаемости при нормальной температуре для исходных компонентов смеси:
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