# Расчет ТОАр
# Условие:
kJ := 1000 J
# Прямой поток - аргон | Обратный поток - аргон
# Давления на входе:
p_7 := 400 kPa
p_10 := 87.994054 kPa
# Температуры на входе:
T_7 := 310 K
T_10 := 110 K
# Энтальпии на входе:
h_7 := 5.3034513*kJ/kg
h_10 := -98.748098*kJ/kg
V_7 := 0.1732756*m^3/s
V_10 := 0.27603056*m^3/s
# Давления на выходе:
p_8 := 383.658 kPa
p_1 := 80.131054 kPa
# Температуры на выходе:
T_8 := 123.52086 K
T_1 := 300 K
# Энтальпии на выходе:
h_8 := -94.215888*kJ/kg
h_1 := 0.77839133*kJ/kg
V_8 := 0.06847222*m^3/s
V_1 := 0.83906667*m^3/s
# Расход прямого и обратного потоков:
G := 1.0776099*kg/s
# Расчет
# В теплообменнике движутся однофазные вещества.
# Ребра - прерывистые.
#
# Геометрические параметры:
# Прямой поток: | Обратный поток:
# l/t  4/2  12/2
#
# Толщина ребра
#
# Расстояние между
# прорезями
#
# Эквивалентный  2,50  3,05
# диаметр,
# dэ [мм]
#
# Компактность по
# свободному объему, [м^2/м^3]
#
# S_св.р  1081  1143
# S_св.п  519  169
# S_св  1600  1312
#
# Степень стеснения, γ  0,285  0,209
#
# Теплообмен:
#
# Re  700 - 4500  700 - 2500
# 2500 - 7500
#
# A  0,0022  0,0031
# 0,19
#
# n  1,16  1,15
# 0,64
#
# Гидравлическое сопротивление:
#
# Re  400 - 900  700 - 2500
# 900 - 6500  2500-10000
#
# B  89,6  0,37
# 0,24  0,23
#
# m  -1,0  -0,21
# -0,13  -0,15
l_пр := 4 mm
t_пр := 2 mm
l_обр := 12 mm
t_обр := 2 mm
δ_р.пр := 0.15 mm
δ_р.обр := 0.25 mm
Δ_пр := 1 mm
Δ_обр := 2 mm
# Эквивалентный диаметр, м, каналов поверхности:
d_э := 4/S_св
d_э := 4*F_св/П
# Прямой поток: | Обратный поток:
d_э.пр := 4/(1600*m^2/m^3) = 2.5 mm
d_э.обр := 4/(1312*m^2/m^3) = 3.04878 mm
# Где F_св - площадь свободного поперечного сечения канала; П - суммарный периметр всех ребер, попавших в поперечное сечение.
#
# Компактность, м^2/м^3, по свободному объему:
S_св := S_св.р + S_св.п
# Прямой поток: | Обратный поток:
S_св.пр := 1081 + 519 = 1600
S_св.обр := 1143 + 169 = 1312
# Где S_св.р и S_св.п - компактности поверхностей ребер и пластин соответственно:
# Прямой поток:
S_св.р.пр := 2/(t_пр - δ_р.пр) = 1081.08 1/m
S_св.п.пр := 2/(l_пр - δ_р.пр) = 519.481 1/m
# Обратный поток:
S_св.р.обр := 2/(t_обр - δ_р.обр) = 1142.86 1/m
S_св.п.обр := 2/(l_обр - δ_р.обр) = 170.213 1/m
# Пересчитаем компактность по свободному объему:
# Прямой поток:
S_св.пр := S_св.п.пр + S_св.р.пр = 1600.56 1/m
# Обратный поток:
S_св.обр := S_св.п.обр + S_св.р.обр = 1313.07 1/m
# Перессчитаем эквивалентный диаметр, мм, каналов поверхности:
# Прямой поток: | Обратный поток:
d_э.пр := 4/S_св.пр = 2.49912 mm
d_э.обр := 4/S_св.обр = 3.0463 mm
# Коэффициент оребрения:
S_св.р.пр/S_св.пр = 0.675439
S_св.р.обр/S_св.обр = 0.87037
# Отношение поверхностей теплообмена:
# Прямой поток: | Обратный поток:
F_пр := l_пр + t_пр + 2*δ_р.пр = 0.0063 m
F_обр := l_обр + t_обр + 2*δ_р.обр = 0.0145 m
F_пр/F_обр = 0.434483
# Степень стеснения γ - доля площади сечения канала, занятая пластинами и ребрами (для каналов с прямоугольными ребрами):
# Толщина пластин:
δ_пл.пр := 1 mm
δ_пл.обр := 1 mm
# Прямой поток:
γ_пр := ((δ_р.пр + δ_пл.пр)*t_пр + (l_пр - δ_пл.пр)*δ_р.пр)/((l_пр + δ_пл.пр)*t_пр) = 0.275
# Обратный поток:
γ_обр := ((δ_р.обр + δ_пл.обр)*t_обр + (l_обр - δ_пл.обр)*δ_р.обр)/((l_обр + δ_пл.обр)*t_обр) = 0.201923
# Удельная площадь свободного счения:
# Прямой поток:
ψ_пр := (l_пр + δ_пл.пр)*(1 - γ_пр) = 0.003625 m
# Обратный поток:
ψ_обр := (l_обр + δ_пл.обр)*(1 - γ_обр) = 0.010375 m
# Определим свойства веществ.
#
# Среднелогарифмическая разность температур:
ΔT_1 := T_7 - T_1 = 10 K
ΔT_2 := T_8 - T_10 = 13.5209 K
ΔT_ср.лог := (ΔT_2 - ΔT_1)/ln(ΔT_2/ΔT_1) = 11.6721 K
# Прямой поток: | Обратный поток:
T_пр := (T_7 + T_8)/2 = 216.76 K
T_обр := (T_1 + T_10)/2 = 205 K
ρ_пр := 8.9455*kg/m^3
ρ_обр := 2.0672*kg/m^3
μ_пр := 17.266*10^-6*Pa*s
μ_обр := 16.354*10^-6*Pa*s
λ_пр := 13.612*10^-3*W/(m*K)
λ_обр := 12.816*10^-3*W/(m*K)
C_p.пр := 0.53122*kJ/(kg*K)
C_p.обр := 0.52306*kJ/(kg*K)
# Тепловая нагрузка теплообменника:
# по теплому потоку:
Q_пр := G*(h_7 - h_8) = 107.243 kW
# по холодному потоку:
Q_обр := G*(h_1 - h_10) = 107.251 kW
# Коэффициенты теплоотдачи
# Зададим скорость обратного потока:
d := 60.61*mm
V_обр := 6*m/s
w := G/(ρ_пр*π*d^2/4) = 41.7521 m/s
V_пр := ρ_обр/ρ_пр*ψ_обр/ψ_пр*G*V_обр/G = 3.96834 m/s
# Критерий Рейнольдса:
w := G/(ρ_обр*π*d^2/4) = 180.676 m/s
# Прямой поток:
F_св.пр := G/(ρ_пр*V_пр) = 0.0303562 m^2
Re_пр := V_пр*ρ_пр*d_э.пр/μ_пр = 5138.18
# Обратный поток:
F_св.обр := G/(ρ_обр*V_обр) = 0.0868816 m^2
Re_обр := V_обр*ρ_обр*d_э.обр/μ_обр = 2310.37
# Фактор теплоотдачи Колборна
# Для расчета пластинчато-ребристых теплообменников необходимо иметь тепловые и гидродинамические характеристики применяемых в них поверхностей, которые часто представляют в виде критериальных зависимостей:
j := St*Pr^(2/3)
Nu := j*Re^n*Pr^(1/3)
j := A*Re^(n - 1)
f := B*Re^m
# Прямой поток: | Обратный поток:
A_пр := 0.0022
A_обр := 0.19
n_пр := 1.16
n_обр := 0.64
j_пр := A_пр*Re_пр^(n_пр - 1) = 0.00863281
j_обр := A_обр*Re_обр^(n_обр - 1) = 0.0116904
# Критерий Прандтля:
# Прямой поток: | Обратный поток:
Pr_пр := μ_пр*C_p.пр/λ_пр = 0.67382
Pr_обр := μ_обр*C_p.обр/λ_обр = 0.667457
# Критерий Нуссельта:
# Прямой поток: | Обратный поток:
Nu_пр := A_пр*Re_пр^n_пр*Pr_пр^(1/3) = 38.8875
Nu_обр := A_обр*Re_обр^n_обр*Pr_обр^(1/3) = 23.6039
α_пр := Nu_пр*λ_пр/d_э.пр = 211.809 W/(m^2*K)
α_обр := Nu_обр*λ_обр/d_э.обр = 99.3035 W/(m^2*K)
# Материал ребер - алюминиевый сплав АМц
# Теплопроводность алюминиевого сплава:
λ_ал := 126*W/(m*K)
# Коэффициент теплопередачи, отнесенный к поверхности теплового потока
#
# параметр ребра
# Прямой поток:
m_пр := sqrt(2*α_пр/(λ_ал*δ_р.пр)) = 149.712 1/m
# Обратный поток:
m_обр := sqrt(2*α_обр/(λ_ал*δ_р.обр)) = 79.4039 1/m
# КПД ребер:
# Прямой поток: | Обратный поток:
η_реб.пр := (1 + (m_пр*l_пр/2)^2/3)^-1 = 0.970982
η_реб.обр := (1 + (m_обр*l_обр/2)^2/3)^-1 = 0.929662
# КПД оребренной поверхности:
# Прямой поток:
η_ор.пр := 1 - S_св.р.пр/S_св.пр*(1 - η_реб.пр) = 0.9804
# Обратный поток:
η_ор.обр := 1 - S_св.р.обр/S_св.обр*(1 - η_реб.обр) = 0.93878
# Фактор трения:
# Прямой поток: | Обратный поток:
B_1.пр := 0.24
m_пр := -0.13
B_1.обр := 0.37
m_обр := -0.21
f_пр := B_1.пр*Re_пр^m_пр = 0.0790325
f_обр := B_1.обр*Re_обр^m_обр = 0.0727493
# Коэффициент теплопередачи:
# Толщина пластин:
δ_пл.пр := 1 mm
δ_пл.обр := 1 mm
k_т := (1/(α_пр*η_ор.пр) + δ_пл.пр*S_св.пр/(λ_ал*S_св.п.пр) + 1/(α_обр*S_св.обр/S_св.пр*η_ор.обр*F_обр/F_пр))^-1 = 95.0469 W/(m^2*K)
k_т.обр := k_т/(F_обр/F_пр) = 41.2962 W/(m^2*K)
# Площадь теплообменной поверхности аппарата:
# Прямой поток:
F_пр1 := 1.1*Q_пр/(k_т*ΔT_ср.лог) = 106.335 m^2
# Обратный поток:
F_обр1 := 1.1*Q_обр/(k_т.обр*ΔT_ср.лог) = 244.757 m^2
# Площадь по потоку фронтального сечения:
# Прямой поток:
F_фр.пр := G/(ρ_пр*V_пр*(1 - γ_пр)) = 0.0418707 m^2
# Обратный поток:
F_фр.обр := G/(ρ_обр*V_обр*(1 - γ_обр)) = 0.108864 m^2
F_фр := F_фр.пр + F_фр.обр = 0.150734 m^2
# Для квадратного сечения:
H := sqrt(F_фр) = 0.388245 m
# Длина теплообменника:
L_пр := F_пр1*V_пр*ρ_пр/(S_св.пр*G) = 2.18855 m
L_обр := F_обр1*V_обр*ρ_обр/(S_св.обр*G) = 2.14545 m
Δ_L := (L_пр - L_обр)/L_пр = 1.96907 %
# Принимаем
L_пр := (L_пр + L_обр)/2 = 2.167 m
L_обр := L_пр = 2.167 m
# Число слоев:
z := H/(l_пр + l_обр + 2*δ_пл.пр) = 21.5692
# Принимаем
z := 22
# Уточнение величины высоты:
H := z*(l_пр + l_обр + 2*δ_пл.пр) = 0.396 m
# Тогда ширина равна:
B := F_фр/H = 0.380642 m
# Гидродинамические сопротивления:
# Прямой поток:
f_тр.пр := 0.24*Re_пр^-0.13 = 0.0790325
Δp_пр := 4*f_тр.пр*ρ_пр*V_пр^2/2*L_пр/d_э.пр = 19.3077 kPa
# Обратный поток:
f_тр.обр := 0.37*Re_обр^-0.21 = 0.0727493
Δp_обр := 4*f_тр.обр*ρ_обр*V_обр^2/2*L_обр/d_э.обр = 7.70248 kPa
# Потери при повороте потока:
ω := π/2
Δp_пов := 2*(sin(ω)^2 + 2*sin(ω)^4)*ρ_пр*V_пр^2/2 = 422.614 Pa
# Потери, связанные с внезапным сужением или расширением потока:
# Прямой поток: | Обратный поток:
Re_пр = 5138.18
Re_обр = 2310.37
γ_пр = 0.275
γ_обр = 0.201923
K_c.пр := 0.5
K_c.обр := 0.53
K_е.пр := 0.52
K_е.обр := 0.61
# Потери на входе и выходе потоков:
Δp_7 := (1 - γ_пр^2 + K_c.пр)*ρ_пр*V_пр^2/2 = 100.327 Pa
Δp_8 := -(1 - γ_пр^2 - K_е.пр)*ρ_пр*V_пр^2/2 = -28.4825 Pa
Δp_10 := (1 - γ_обр^2 + K_c.обр)*ρ_обр*V_обр^2/2 = 55.4135 Pa
Δp_1 := -(1 - γ_обр^2 - K_е.обр)*ρ_обр*V_обр^2/2 = -12.9946 Pa
# Суммарные потери для каждого из потоков:
Δp_пр := Δp_пр + Δp_7 + Δp_пов - Δp_8 = 19.8591 kPa
Δp_обр := Δp_обр + Δp_10 + Δp_пов - Δp_1 = 8.1935 kPa
# Давление на выходе прямого потока: | Давление на входе обратного потока:
p_вых.пр := p_7*(1 - Δp_пр/p_7) = 380.141 kPa
p_вх.обр := p_10*(1 - Δp_обр/p_10) = 79.8006 kPa
# Объем теплообменника:
V := L_пр*H*B = 0.326642 m^3
# Объем одного слоя:
V_сл := V/z = 0.0148473 m^3
# Потери давления во входной и выходной крышке:
# Скорости хладагента:
V_пр = 3.96834 m/s
V_обр = 6 m/s
# Плотности:
ρ_пр = 8.9455 kg/m^3
ρ_обр = 2.0672 kg/m^3
# Расход по прямому
# и обратному потокам:
G = 1.07761 kg/s
# Определим площади и диаметры патрубков:
S_пр := G/(V_пр*ρ_пр) = 0.0303562 m^2
S_пр := 0.03*m^2
# =>
d_пр := sqrt(4*S_пр/π) = 0.195441 m
S_обр := G/(V_обр*ρ_обр) = 0.0868816 m^2
S_обр := 0.087*m^2  # =>
d_обр := sqrt(4*S_обр/π) = 0.332824 m
# Потери давления во входном и выходном патрубке:
# Скорость рабочего тела в патрубке:
w_пр := G/(ρ_пр*S_пр) = 4.01546 m/s
w_обр := G/(ρ_обр*S_обр) = 5.99183 m/s
# Отношение узкого и широкого сечений:
K_f := S_пр/F_фр.пр = 0.716492
# Для прямого теплого потока:
T_пр := [T_7; T_8]
# Для обратного холодного потока:
T_обр := [T_10; T_1]
# Зависимость количества теплоты от температуры:
Q_пр := [0; Q_пр] = [0; 107.243] kW
Q_обр := [Q_обр; 0] = [107.251; 0] kW
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