# [reference: rfp2mcd(c) Release [mcd14].xmcd]
# Изоэнтропный  КПД компрессора
η_s := 0.82
# КПД двигателя
η_дв := 0.95
# Температура кипения
t_0 := 1 °C
# Температура конденсации
t_к := 47 °C
# Холодопроизводительность требуемая
Q_x := 710*кВт
# Перегрев
ΔT_г := 5*K
# Переохлаждение
ΔT_х := 3*K
# Переогрев в ТОА Э
ΔT_Э := 1*K
# Хладагент
ХА := "R142B"
hfld := concat("C:\Rfp8\fluids\", ХА, ".FLD")
i := 1
ierr_SETUP(i, hfld, hfm, hrf) = 0
x_tst := [1]
x := x_tst
# Давление конденсации:
p_k := p_s_Tx(t_к, x_tst) = 6.31209 бар
# Давление кипения:
p_0 := p_s_Tx(t_0, x_tst) = 1.50102 бар
# Отношение давления:
π_k := p_k/p_0 = 4.20519
# Определение параметров в ключевых точках цикла:
# Параметры в точке 1 (выход из испрителя):
p_1 := p_0
t_1 := T_s_py(p_1, x_tst)
# Давление:
p_1 = 1.50102 бар
# Температура:
ρ_1 := ρ_Tpx_v(t_1, p_1, x)
i_1 := h_Tdx(t_1, ρ_1, x)
s_1 := s_Tdx(t_1, ρ_1, x)
t_1 = 1 °C
# Плотность:
ρ_1 = 6.9956 кг/м^3
# Энтальпия:
i_1 = 418.615 кДж/кг
# Энтропия:
s_1 = 1.79742 кДж/(кг*K)
# Параметры в точке 1' (после перегрева ТРВ):
# Давление:
p_1' := p_0 = 1.50102 бар
# Температура:
t_1' := t_0 + ΔT_г = 6 °C
ρ_1' := ρ_Tpz(t_1', p_1, x)
i_1' := h_Tdx(t_1', ρ_1', x)
s_1' := s_Tdx(t_1', ρ_1', x)
# Плотность:
ρ_1' = 6.84228 кг/м^3
# Энтальпия:
i_1' = 422.873 кДж/кг
# Энтропия:
s_1' = 1.81281 кДж/(кг*K)
# Промежуточное давление:
p_m := sqrt(p_1*p_k) + 0.2*бар = 3.27808 бар
# Температура насыщенных паров при промежуточном давлении:
T_m := T_s_py(p_m, x_tst) = 24.0287 °C
# Степень сжатия первой ступени:
π_1 := p_m/p_0 = 2.1839
# Степень сжатия второй ступени:
π_2 := p_k/p_m = 1.92554
# Параметры в точке 1''
ΔT_эд := 0
# Температура:
t_1'' := t_1' + ΔT_эд = 279.15 K
# Давление:
p_1'' := p_1' = 1.50102 бар
ρ_1'' := ρ_Tpz(t_1'', p_1', x)
s_1'' := s_Tdx(t_1'', ρ_1'', x)
i_1'' := h_Tdx(t_1'', ρ_1'', x)
# Плотность:
ρ_1'' = 6.84228 кг/м^3
# Энтальпия:
i_1'' = 422.873 кДж/кг
# Энтропия:
s_1'' = 1.81281 кДж/(кг*K)
# Параметры точки 2s (после первой ступени)
# Давление:
p_2s := p_m = 3.27808 бар
# Энтропия:
s_2s := s_1'' = 1.81281 кДж/(кг*K)
t_2s := T_psz(p_2s, s_2s, x)
i_2s := h_psz(p_2s, s_2s, x)
ρ_2s := ρ_Tpx_v(t_2s, p_2s, x)
# Плотность:
ρ_2s = 14.185 кг/м^3
# Энтальпия:
i_2s = 440.493 кДж/кг
# Температура:
t_2s = 31.4014 °C
# Параметры в точке 2 (выход после первой ступени)
# Давление:
p_2 := p_m = 3.27808 бар
# Энтальпия:
i_2 := (i_2s - i_1'')/η_s + i_1'' = 444.361 кДж/кг
# Энтропия:
s_2 := s_phz(p_2, i_2, x_tst)
t_2 := T_phz(p_2, i_2, x_tst)
ρ_2 := ρ_phz(p_2, i_2, x_tst)
s_2 = 1.82543 кДж/(кг*K)
# Плотность:
ρ_2 = 13.9268 кг/м^3
# Температура:
t_2 = 35.5679 °C
# Параметры точки 5 (конец конденсации):
# Давление:
p_5 := p_k = 6.31209 бар
# Температура:
t_5 := T_s_px(p_k, x_tst)
ρ_5 := ρ_Tpz(t_5, p_k, x)
i_5 := h_Tdx(t_5, ρ_5, x)
s_5 := s_Tdx(t_5, ρ_5, x)
t_5 = 47 °C
# Плотность:
ρ_5 = 1052.7 кг/м^3
# Энтальпия:
i_5 = 261.789 кДж/кг
# Энтропия:
s_5 = 1.20699 кДж/(кг*K)
# Параметры в точке 6 (после переохлаждения):
# Температура:
t_6 := t_5 - ΔT_х = 44 °C
# Давление:
p_6 := p_k = 6.31209 бар
# Плотность:
ρ_6 := ρ_Tpz(t_6, p_k, x)
i_6 := h_Tdx(t_6, ρ_6, x) = 257.659 кДж/кг
s_6 := s_Tdx(t_6, ρ_6, x)
ρ_6 = 1061.28 кг/м^3
# Энтальпия:
i_6 = 257.659 кДж/кг
# Энтропия:
s_6 = 1.19403 кДж/(кг*K)
# Параметры точки 7 (поток экономайзера после ТРВ):
# Давление:
p_7 := p_m = 3.27808 бар
# Энтальпия:
i_7 := i_6 = 257.659 кДж/(кг*K)
# Температура:
t_7 := T_m = 24.0287 °C
s_7 := s_phz(p_7, i_7, x_tst)
# Энтропия:
s_7 = 1.19786 кДж/(кг*K)
# Параметры точки 8 (поток экономайзера на выходе из ТОА):
# Давление:
p_8 := p_m = 3.27808 бар
# Температура:
t_8 := t_7 + ΔT_Э = 25.0287 °C
ΔT_Э
# Плотность:
ρ_8 := ρ_Tpz(t_8, p_8, x)
i_8 := h_Tdx(t_8, ρ_8, x)
s_8 := s_Tdx(t_8, ρ_8, x)
ρ_8 = 14.6084 кг/м^3
# Энтальпия:
i_8 = 434.561 кДж/кг
# Энтропия:
s_8 = 1.79313 кДж/(кг*K)
# Параметры точки 9 (основной поток на выходе из ТОА):
# Температура:
t_9 := t_7 + ΔT_Э = 25.0287 °C
# Давление:
p_9 := p_k = 6.31209 бар
# Плотность:
ρ_9 := ρ_Tpz(t_9, p_9, x)
i_9 := h_Tdx(t_9, ρ_9, x)
s_9 := s_Tdx(t_9, ρ_9, x)
ρ_9 = 1112.16 кг/м^3
# Энтальпия:
i_9 = 232.227 кДж/кг
# Энтропия:
s_9 = 1.11136 кДж/(кг*K)
# Параметры точки 10 (основной поток после ТРВ):
# Давление:
p_10 := p_0 = 1.50102 бар
# Энтальпия:
i_10 := i_9 = 232.227 кДж/кг
# Энтропия:
s_10 := s_phz(p_10, i_10, x_tst)
t_10 := T_phz(p_10, i_10, x_tst)
ρ_10 := ρ_phz(p_10, i_10, x_tst)
s_10 = 1.11754 кДж/(кг*K)
# Плотность:
ρ_10 = 47.3886 кг/м^3
# Температура:
t_10 = 1 °C
# Массовый расход через испаритель и первую ступень компрессора
m_I := Q_x/(i_1 - i_10) = 3.80926 кг/с
# Массовый расход через вторую ступень компрессора
m_II := m_I*(i_9 - i_8 - i_6 + i_7)/(i_7 - i_8) = 4.35688 кг/с
# Массовый расход потока экономайзера
m_Э := m_II - m_I = 1971.42 кг/ч
# Параметры точки 3 (смешение потоков при промежуточном давлении в компрессоре):
# Энтальпия:
i_3 := (m_I*i_2 + m_Э*i_8)/m_II = 443.129 кДж/кг
# Давление:
p_3 := p_m = 3.27808 бар
s_3 := s_phz(p_3, i_3, x_tst)
t_3 := T_phz(p_3, i_3, x_tst)
ρ_3 := ρ_phz(p_3, i_3, x_tst)
# Энтропия:
s_3 = 1.82143 кДж/(кг*K)
# Плотность:
ρ_3 = 14.0076 кг/м^3
# Температура:
t_3 = 34.2406 °C
# Параметры точки 4s (после второй ступени)
# Давление:
p_4s := p_k = 6.31209 бар
# Энтропия:
s_4s := s_3 = 1.82143 кДж/(кг*K)
# Плотность:
t_4s := T_psz(p_4s, s_4s, x)
i_4s := h_psz(p_4s, s_4s, x)
ρ_4s := ρ_Tpx_v(t_4s, p_4s, x)
ρ_4s = 26.3454 кг/м^3
# Энтальпия:
i_4s = 458.676 кДж/кг
# Температура:
t_4s = 57.5704 °C
# Параметры в точке 4 (выход после второй ступени)
# Давление:
p_4 := p_k = 6.31209 бар
# Энтальпия:
i_4 := (i_4s - i_3)/η_s + i_3 = 462.088 кДж/кг
# Энтропия:
s_4 := s_phz(p_4, i_4, x_tst)
t_4 := T_phz(p_4, i_4, x_tst)
ρ_4 := ρ_phz(p_4, i_4, x_tst)
s_4 = 1.83169 кДж/(кг*K)
# Плотность:
ρ_4 = 25.9289 кг/м^3
# Температура:
t_4 = 60.9453 °C
# Параметры в точке 4' (выход после второй ступени с учетом впрыска холодного масла)
# Температура:
t_4' := t_4
# Давление:
p_4' := p_k = 6.31209 бар
# Плотность:
ρ_4' := ρ_Tpz(t_4', p_4', x)
i_4' := h_Tdx(t_4', ρ_4', x)
s_4' := s_Tdx(t_4', ρ_4', x)
ρ_4' = 25.9289 кг/м^3
# Энтальпия:
i_4' = 462.088 кДж/кг
# Энтропия:
s_4' = 1.83169 кДж/(кг*K)
# Производительность маслоохладителя:
Q_МО := m_II*(i_4 - i_4') = 8.23e-7 кВт
# Производительность конденсатора:
Q_Кд := m_II*(i_4' - i_5) = 872.68 кВт
# Мощность первой ступени сжатия:
N_I := m_I*(i_2 - i_1'') = 81.8541 кВт
# Мощность второй ступени сжатия:
N_II := m_II*(i_4 - i_3) = 82.602 кВт
# Объемный расход на всасывании:
V_всI := m_I/ρ_1'' = 2004.21 м^3/ч
V_всII := m_II/ρ_3 = 1119.73 м^3/ч
# Холодильный коэффициент:
ε := Q_x/(N_I + N_II) = 4.31726
N_I + N_II = 164.456 kW
# Удельная ХП:
q_x := Q_x/m_I = 186.388 кДж/кг
q_xV := q_x*ρ_1'' = 1275.32 кДж/м^3
# Расчет конденсатора
# Параметры охлаждающей воды
# Температур охлаждающей воды на выходе из конденсатора:
T_w_out := 43 °C = 316.15 K
# Температур охлаждающей воды на входе из конденсатора:
T_w_in := 35 °C = 308.15 K
# Средняя температура охлаждающей воды:
T_w_m := 0.5*(T_w_out + T_w_in) = 39 °C
# Усредненная теплоемкость воды при средней температуре:
C_p_w := 4.174*кДж/(кг*K)
# Усредненная плотность воды при средней температуре:
ρ_w := 995.7*кг/м^3
# Усредненная динамическая вязкость воды при средней температуре:
μ_w := 801.5*10^-6*Па*с
# Усредненная кинематическая вязкость воды при средней температуре:
ν_w := 0.805*10^-6*м^2/с
# Усредненная теплопроводность воды при средней температуре:
λ_w := 0.618*Вт/(м*K)
# Число Прандтля по усредным параметрам:
Pr_w := C_p_w*μ_w/λ_w = 5.41337
# Максимально допустимое гидравлическое сопротивление конденсатора по стороне охлаждающей воды:
ΔP_w := 1*бар
# Параметры охлаждаемой среды
# Теплота, снимаемая в процессе конденсации (нагрузка на конденсатор):
Q_Кд = 872.68 кВт
Q_Кд := Q_Кд/2 = 436.34 кВт
# Температура начала процесса охлаждения в конденсаторе:
T_кд_охл := t_4 = 60.9453 °C
# Температура начала процесса непосредственной конденсации в конденсаторе:
T_кд_конд := t_5 = 47 °C
# Температура конца процесса переохлаждения в конденсаторе:
T_кд_по := t_6 = 44 °C
# Давление фреона в конденсаторе:
p_кд := p_4 = 6.31209 бар
# Энтальпия жидкой фазы:
h_ж := h_Tdx(t_0, ρ_s_Tx(t_0, x_tst), x_tst) = 201.255 кДж/кг
# Энтальпия паровой фазы:
Q_Кд/(7 K*C_p_w)/(1000*kg/(m*m*m)) = 53.7622 m*m*m/hr
h_п := h_Tdx(t_0, ρ_s_Ty(t_0, x_tst), x_tst) = 418.615 кДж/кг
# Энтальпия точки конца расширения:
h_R := i_10 = 232.227 кДж/кг
# Доля пара (степень сухости) после расширения:
y_R := (h_R - h_ж)/(h_п - h_ж) = 14.2492 %
# Удельная массовая холодопроизводительность:
q_x := h_п - h_R = 186.388 кДж/кг
# Массовый расход фреона:
G_R := m_II = 15684.8 кг/ч
# Плотность жидкой фазы:
ρ_R_ж := ρ_s_Tx(T_кд_конд, x_tst) = 1052.7 кг/м^3
# Плотность паровой фазы:
ρ_R_п := ρ_s_Ty(T_кд_конд, x_tst) = 27.8019 кг/м^3
# Объемный расход паровой фазы охлаждающей среды:
V_п := G_R*y_R/ρ_R_п = 0.0223301 м^3/с
# Объемный расход жидкой фазы охлаждающей среды:
V_ж := G_R*(1 - y_R)/ρ_R_ж = 0.00354902 м^3/с
# Теплоемкость паровой фазы:
C_p_R_п := C_p_Tdx(T_кд_конд, ρ_R_п, x_tst) = 1.0342 кДж/(кг*K)
# Теплоемкость жидкостной фазы:
C_p_R_ж := C_p_Tdx(T_кд_конд, ρ_R_ж, x_tst) = 1.38233 кДж/(кг*K)
# Теплопроводность паровой фазы:
λ_R_п := λ_Tdx(T_кд_конд, ρ_R_п, x_tst) = 0.0130573 Вт/(м*K)
# Теплопроводность жидкостной фазы:
λ_R_ж := λ_Tdx(T_кд_конд, ρ_R_ж, x_tst) = 0.0736132 Вт/(м*K)
# Динамическая вязкость паровой фазы:
μ_R_п := μ_Tdx(T_кд_конд, ρ_R_п, x_tst) = 1.12326e-5 Па*с
# Динамическая вязкость жидкостной фазы:
μ_R_ж := μ_Tdx(T_кд_конд, ρ_R_ж, x_tst) = 0.000182131 Па*с
# Число Прандтля для паровой фазы:
Pr_R_п := C_p_R_п*μ_R_п/λ_R_п = 0.88967
# Число Прандтля для жидкостной фазы:
Pr_R_ж := C_p_R_ж*μ_R_ж/λ_R_ж = 3.4201
# Критическое давление охлаждающей среды:
p_кр := p_c_i(1) = 40.55 бар
# Теплота фазового перехода:
r := h_Tdx(T_кд_конд, ρ_s_Ty(T_кд_конд, x_tst), x_tst) + (-h_Tdx(T_кд_конд, ρ_s_Tx(T_кд_конд, x_tst), x_tst)) = 186.08 кДж/кг
# [component: outputs Pl]
Params := [
    1, 2, 3, 4, 5, 6, 7, 8;
    0.2, 0.2, 0.5, 0.6, 0.63, 1.1, 1.3, 0;
    0.0088, 0.008, 0.00585, 0.0083, 0.0074, 0.01437, 0.0096, 0;
    0.00176, 0.0011, 0.00134, 0.00245, 0.00262, 0.00645, 0.00425, 0;
    0.81, 0.55, 1.25, 2.82, 0.908, 1.34, 1.28, 0;
    0.8, 0.7, 1.27, 1.188, 1.41, 1.824, 1.764, 0;
    0.001, 0.001, 0.001, 0.001, 0.001, 0.001, 0.001, 0;
    2.5, 3.2, 3.12, 5.8, 6.5, 12.2, 12.0, 0;
    0.96, 1.37, 1.37, 1.375, 1.375, 1.95, 1.915, 0;
    0.46, 0.3, 0.5, 0.6, 0.66, 0.95, 0.92, 0;
    0.072, 0.0208, 0.036, 0.0208, 0.036, 0.027, 0.0208, 0;
    0.036, 0.018, 0.018, 0.018, 0.018, 0.045, 0.018, 0;
    0.0045, 0.004, 0.004, 0.0045, 0.0045, 0.0075, 0.045, 0;
    14, 50, 46, 63, 72, 72, 95, 0;
    0.4, 0.025, 0.45, 0.545, 0.6, 0.86, 0.846, 0;
    0.0045, 0.004, 0.004, 0.0045, 0.0045, 0.0075, 0.0045, 0;
    120, 60, 30, 60, 30, 45, 60, 0;
    0.46, 0.6, 0.6, 0.6, 0.46, 0.46, 0.46, 0;
    425, 425, 300, 320, 210, 400, 400, 0;
    28, 54.3, 21, 21, 21, 21, 21, 0;
    0.065, 0.1, 0.0978, 0.135, 0.1, 0.135, 0.135, 0;
    0.73, 0.73, 0.73, 0.73, 0.73, 0.73, 0.73, 0;
    19.6, 19.3, 6.3, 15.0, 4.0, 17.0, 17.0, 0;
    150, 65, 150, 200, 200, 300, 300, 0
]
# Плошадь теплообмена пластины:
F_1 := Params[1, Pl - 1]*м^2 = 0.2 м^2
# Эквивалетный диаметр канала:
d_экв := Params[2, Pl - 1]*м = 8.8 мм
# Площадь поперечного сечения межпластинного канала:
f_1 := Params[3, Pl - 1]*м^2 = 0.00176 м^2
# Смачиваемый периметр в поперечном сечении канала:
П := Params[4, Pl - 1]*м = 0.81 м
# Приведенная длина канала:
L_п := Params[5, Pl - 1]*м = 0.8 м
# Толщина стенки пластины:
δ_ст := Params[6, Pl - 1]*м = 1 мм
# Масса пластины:
m_пл := Params[7, Pl - 1]*кг = 2.5 кг
# Длина пластины:
L_пл := Params[8, Pl - 1]*м = 0.96 м
# Ширина пластины:
B_пл := Params[9, Pl - 1]*м = 460 мм
# Шаг гофры вдоль потока:
S_гоф := Params[10, Pl - 1]*м = 72 мм
# Шаг гофры по нормали к гофру:
S_Нгоф := Params[11, Pl - 1]*м = 36 мм
# Высота гофра:
h_гоф := Params[12, Pl - 1]*м = 4.5 мм
# Количество гофров:
z := Params[13, Pl - 1] = 14
# Ширина канала:
b_k := Params[14, Pl - 1]*м = 400 мм
# Зазор для прохода рабочей среды:
δ := Params[15, Pl - 1]*мм = 0.0045 мм
# Угол наклона гофра к оси симметрии:
φ_гоф := Params[16, Pl - 1]*deg = 120 deg
# Наибольший диаметр штуцеров:
D_шт := Params[23, Pl - 1]*мм = 150 мм
# Материал пластин: сталь 12Х18Н10Т
# Коэффициент теплопроводности:
λ_ст := 16*Вт/(м*K)
# Постоянные коэффициенты и показатели степенеи в уравнениях для расчета теплоотдачи и гидравлического сопротивления:
c_л := Params[17, Pl - 1] = 0.46
B := Params[18, Pl - 1] = 425
K_V := Params[19, Pl - 1] = 28
c_т := Params[20, Pl - 1] = 0.065
n := Params[21, Pl - 1] = 0.73
A := Params[22, Pl - 1] = 19.6
# Расчет поверхности теплообмена
# Объемный расход охлаждающей воды:
V_w := Q_Кд/(C_p_w*ρ_w*(T_w_out - T_w_in)) = 47.2451 м^3/ч
# Среднелогарифмический температурный напор:
Θ_ln := ((T_кд_по - T_w_in) - (T_кд_конд - T_w_out))/ln((T_кд_по - T_w_in)/(T_кд_конд - T_w_out)) = 6.16576 K
# Средняя температура стенки:
t_ст := 0.5*((T_w_out + T_w_in)/2 + T_кд_по) = 41.5 °C
# Разность температур насыщения и средней температуры стенки
Δt := T_кд_по - t_ст = 2.5 K
# Перепад температур при охлаждении фреона от температуры конца сжатия до температуры конденсации:
ΔT_охл := T_кд_охл - T_кд_конд = 13.9453 K
# Перепад температур при охлаждении фреона от температуры конденсации до температуры конца переохлаждения:
ΔT_по := T_кд_конд - T_кд_по = 3 K
# Расчет коэффициента теплоотдачи со стороны конденсирующегося фреона с учетом поправки на охлаждение и переохлаждение пара в конденсаторе:
α_R(t_ст) := 1.15*nthroot(g*ρ_R_ж^2*λ_R_ж^3*(r + C_p_R_п*ΔT_охл + C_p_R_п*ΔT_по)/(μ_R_ж*L_п*(T_кд_конд - t_ст)), 4)
α_R(t_ст) = 1178.11 Вт/(м^2*K)
# Вввдение поправок на охлаждение фреона в конденсаторе справедливо, поскольку эти процессы сопровождаются незначительным температурным перепадом.
# Определим рациональную скорость движения охлаждающей воды в каналах конденсатора, задав
α_R' := 950*Вт/(м^2*K)
# Тогда:
w_w := (8*α_R'*(t_ст - T_w_m)*ΔP_w*d_экв^0.25/(A*C_p_w*(T_w_out - T_w_in)*ρ_w^2*ν_w^0.25))^0.364
w_w := (8*α_R'/(Вт/(м^2*K))*((t_ст - T_w_m)/K)*ΔP_w/Па*(d_экв/м)^0.25/(A*C_p_w/(Дж/(кг*K))*((T_w_out - T_w_in)/K)*(ρ_w/(кг/м^3))^2*(ν_w/(м^2/с))^0.25))^0.364*м/с
w_w = 0.278845 м/с
# Число Рейнольдса для потока воды:
Re_w := w_w*d_экв/ν_w = 3048.24
# Коэффициент общего гидравлического сопротивления единицы относительной длины канала на стороне воды:
ξ_2 := A/Re_w^0.25 = 2.63781
# Число Нуссельта для потока нагреваемой среды:
Nu_w := c_т*Re_w^0.73*Pr_w^0.43 = 46.9527
# Коэффициент теплоотдачи от стенки к воде:
α_w := Nu_w*λ_w/d_экв = 3297.36 Вт/(м^2*K)
# Термическое сопротивление стенки:
R_ст := δ_ст/λ_ст = 6.25e-5 м^2*K/Вт
# Термическое сопротивление на загрязненных каналах по водяному потоку:
R_гр := 2*R_ст = 0.000125 м^2*K/Вт
# Коэффициент теплопередачи аппарата:
K_тоа(t_ст) := 1/(1/α_R(t_ст) + R_ст + R_гр + 1/α_w)
K_тоа(t_ст) = 746.497 Вт/(м^2*K)
# Правильность выбора температуры стенки со стороны конденсирующегося фреона:
t_ст_new(t_ст) := T_кд_по - K_тоа(t_ст)/α_R(t_ст)*(T_кд_по - T_w_m)
t_ст' := t_ст_new(t_ст) = 40.8318 °C
t_ст = 41.5 °C
δ := |t_ст - t_ст'| = 0.668196 K
# Требуется дополнительное приближение. Пересчитанное значение:
K_тоа(t_ст') = 732.991 Вт/(м^2*K)
t_ст'' := t_ст_new(t_ст') = 40.7987 °C
t_ст' = 40.8318 °C
δ := |t_ст'' - t_ст'| = 0.0331419 K
# Поверхность теплообмена конденсатора
F_тоа := Q_Кд/(K_тоа(t_ст')*Θ_ln) = 96.5472 м^2
# С учетом запаса принимается площадь поверхности конденсатора:
F_тоа := Ceil(F_тоа, 5*м^2) = 100 м^2
# Площадь поперечного сечения пакета на стороне воды:
f_пw := V_w/w_w = 0.0470643 м^2
# Число каналов в одном пакете:
m_w := f_пw/f_1 = 26.7411
# Принимается:
m_w := Ceil(m_w, 1) = 27
# Число пластин в одном пакете для воды:
n_w := 2*m_w = 54
# Поверхность теплообмена одного пакета:
F_пw := F_1*n_w = 10.8 м^2
# Число пакетов (ходов) в аппарате на стороне воды:
X_w := Ceil(F_тоа/F_пw, 1) = 10
# При найденном числе ходов предварительное гидравлическое сопротивление аппарата по стороне охлаждающей воды:
ΔP_w' := ξ_2*L_п/d_экв*ρ_w*w_w^2/2*X_w = 0.928269 бар
ΔP_w = 1 бар
# Гидравлическое сопротивление по потоку воды без пакетной компановки:
ΔP_w_0 := ξ_2*L_п/d_экв*ρ_w*w_w^2/2 = 9.28269 кПа
# Расчетное число пластин в аппарате (с учетом концевых пластин):
n_пл := Ceil(F_тоа/F_1 + 2, 1) = 502
# Схема компоновки пластин в аппарате в случае пакетного набора:
C_x := 72/(18 + 18 + 18 + 18) = 1
# Наибольший диаметр штуцера:
D_шт = 150 мм
# Принимается диаметр штуцера:
D_шт := 96*мм
# Скорость воды в штуцере:
w_штn := 4*V_w/(π*D_шт^2) = 1.8131 м/с
# Потерями давления на местном сопротивлении можно пренебречь, т.к. скорость меньше максмиальной (2.5 м/с).
# Мощность, требуемая для преодоления гидравлического сопротивления на стороне воды при коэффициенте полезного действия насоса:
η := 0.65
N_насос := V_w*ΔP_w'/η = 1874.19 Вт
# Масса аппарата с учетом металлоконструкций и штуцеров:
M_тоа := m_пл*n_пл + 0.4*(m_пл*n_пл) = 1757 кг
