# СОДЕРЖАНИЕ
# 1. ПОДКЛЮЧЕНИЕ РАБОЧЕЙ СМЕСИ
# 2. ИСХОДНЫЕ ДАННЫЕ
# 3. ОПРЕДЕЛЕНИЕ ДАВЛЕНИЯ КОМПРИМИРОВАНИЯ
# 3.0.  Известные параметры
# 3.1.  Двухпоточный ТОА с дроссельной ступенью
# 3.1.1. Вариант 1. Известна термическая эффективность ТОА
# 3.2.  Трехпоточный ТОА с дроссельной ступенью
# 3.2.1. Вариант 1. Известна недорекуперация основного потока и
# температура смеси на входе в аппарат
# 1. ПОДКЛЮЧЕНИЕ РАБОЧЕЙ СМЕСИ | К содержанию...
# [area: Подключение смеси]
# [reference: rfp2mcd(c) Release [mcd14].xmcd]
# Состав смеси:
hfld1 := "C:\Rfp8\fluids\NITROGEN.FLD|"  # NITROGEN.FLD
hfld2 := "C:\Rfp8\fluids\OXYGEN.FLD|"  # OXYGEN.FLD
hfld := concat(hfld1, hfld2)  # ARGON.FLD
i := 2
ierr_SETUP(i, hfld, hfm, hrf) = 0
# Примечание
#
# 1. Компоненты задавать в порядке возрастания нормальной температуры кипения.
# Столбцы концентраций чистых компонентов смеси:
x_н := [1; 0]
x_в := [0; 1]
# К содержанию...
# 2. ИСХОДНЫЕ ДАННЫЕ
# (минимально необходимые для демонстрации расчета)
# Давление на входе (асб.):
p_вх := 3*атм = 303.975 кПа
p_раб := p_вх
# Концентрация компонентов смеси (мольные):
C_N2 := 0.79
C_O2 := 0.21
# Чистота низкокипящего компонента (азота):
C_нк := 0.99
# Чистота высококипящего компонента (аргона):
C_вк := 0.95
# Параметры исходной смеси:
x_см := [C_N2; C_O2] = [0.79; 0.21]
# Параметры продукционных потоков на выходе из колонны:
x_пр := [C_нк; C_вк] = [0.99; 0.95]
# К содержанию...
# 3. ОПРЕДЕЛЕНИЕ ДАВЛЕНИЯ КОМПРИМИРОВАНИЯ
# 3.0. Известные параметры
# (Схему цикла см. в видео с соответсвующим семинаром)
# Диапазон рабочих температур колонны:
T_max := T_s_py(p_раб, [x_см[0]; 1 - x_см[0]]) = 92.3632 K
T_min := T_s_px(p_раб, [x_см[0]; 1 - x_см[0]]) = 89.9187 K
# Зададим долю пара в питающем потоке:
y_п := 0.6
x_ж := 1 - y_п = 0.4
# Температура вводимой в колонну смеси:
T_см. := 90 K
Given
q_phz(p_раб, h_Tpz(T_см., p_раб, x_см), x_см) == y_п
T_см := Find(T_см.) = 91.0106 K
# * Вспомогательные функции
# 1. Расчет энтальпии по температуре и концентрации НК компонента:
h_ПБ_Tx(T, x) := h_Tpz(T, p_раб, [x; 1 - x])
# Вспомогательные функции *
# В соответствии с обозначениями, принятыми на семинаре, точка ввода смеси в колонну обозначается как М. Параметры точки М:
x_M := x_см[0] = 0.79
h_M := h_ПБ_Tx(T_см, x_см[0]) = 7.71088 кДж/кг
# Фазовый состав продукционного потока (рекуперируемого) - и доля потока P:
# [component: outputs РекПоток]
X_P :=
    [x_пр[0]; 1 - x_пр[0]] if РекПоток == 1
    [1 - x_пр[1]; x_пр[1]] if РекПоток == 2
    = [0.99; 0.01]
# [component: outputs РекПотокФ]
P := 0.8
# К содержанию...
# 3.1. Двухпоточный ТОА с дроссельной ступенью
# 3.1.1. Вариант 1. Известна термическая эффективность ТОА
# Для ТОА уравнение теплового баланса имеет вид:
i_1 + P*i_4 == i_2 + P*i_5
# В данном случае не учитываются потери на компенсацию теплопритоков из окружающей среды. Этот аспект расчета предлагается на самостоятельное рассмотрение.
# С учетом допущения о правомерности использования уравнения Менделеева-Клапейрона для точек 4 и 5 уравнение теплового баланса приводится к виду:
i_1(T_1, p_2, X_см) == i_2(X_см) + P*(i_5'(T_1, X_P) - i_4(X_P) - C_p_(T_1, X_P)*ΔT)
# где:
# T_1 | - температура смеси на входе в ТОА, независимый параметр;
# p_2 | - искомое давление нагнетания (компримирования);
# X_см | - начальная концентрация компонентов смеси;
X_P
# - концентрация компонентов смеси в продукционном потоке P;
i_2
# - энтальпия смеси на выходе из ТОА и после дроссельного вентиля;
# P | - доля продукционного потока относительно потока смеси М;
# i_4 | - энтальпия продукционного потока P;
# C_p_ | - усредненная теплоемкость продукционного потока;
C_p_(T_1, X_P) == (C_p_Tpz(T_1, p_4, X_P) + C_p_Tpz(T_1 + ΔT, p_4, X_P))/2
# ΔT | - недорекуперация ТОА на теплом конце;
# p_4 | - давление продукционного потока (давление в колонне).
# Желаемая недорекуперация ТОА:
ΔT := 12 K
# Сделаем подстановки:
i_1(T_1, p_2, X_см) == h_Tpz(T_1, p_2, X_см)
i_2(X_см) == h_M
i_5'(T_1, X_P) := h_Tpz(T_1, p_раб, X_P)
C_p_(T_1, X_P) := 0.5*(C_p_Tpz(T_1, p_раб, X_P) + C_p_Tpz(T_1 - ΔT, p_раб, X_P))
# Если рекуперируемый поток в жидкой фазе:
i_4(X_P) == h_Tdx(T_s_px(p_раб, X_P), ρ_s_px(p_раб, X_P), X_P)
# Если рекуперируемый поток в паровой фазе:
i_4(X_P) == h_Tdx(T_s_py(p_раб, X_P), ρ_s_py(p_раб, X_P), X_P)
# В параметрическом виде:
i_4(X_P) :=
    h_Tdx(T_s_px(p_раб, X_P), ρ_s_px(p_раб, X_P), X_P) if РекПотокФ == 1
    h_Tdx(T_s_py(p_раб, X_P), ρ_s_py(p_раб, X_P), X_P) if РекПотокФ == 2
# Представим и решим уравнение в виде:
Given
T_1 := 200 K
h_Tpz(T_1, p_2, x_см) == h_M + P*(i_5'(T_1, X_P) - i_4(X_P) - C_p_(T_1, X_P)*ΔT_s)
T_1(p_2, ΔT_s) := Find(T_1)
p_2 := 10, 10 + 20 .. 300
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# 1. Чтобы цикл был работоспособен при значении температуры смесевого потока на входе в ТОА, например 300К и доли пара 0.6, требуется дополнительный "холод". Обеспечить работу цикла даже за счет сверхвысокого давления компримирования (компрессии) нельзя. Максимальная температура на входе в ТОА смесевого потока для эффективной работы цикла составляет 160К.
# 2. Если увеличить долю пара на входе в колонну до 0.8, то максимальная температура на входе в ТОА составит 185К при том же давлении, что в п.1.
# К содержанию...
# 3.2. Трехпоточный ТОА с дроссельной ступенью
Ft(t) :=
    "Низкокипящий" if t == 1
    "Высококипящий" if t == 2
# 3.2.1. Вариант 1. Известна недорекуперация основного потока и
# температура смеси на входе в аппарат
# Температура смеси на входе в ТОА:
T_1 := 300 K
# Основной поток (доля расхода наибольшая)
# Доля потока:
D := 0.8
# Тип потока:
# [component: outputs Dt]
# Фазовый состав:
# [component: outputs Df]
# Недорекуперация по потоку (желаемая или обспечиваемая ТОА):
ΔT_D := 12 K
# Концентрации:
X_D :=
    [x_пр[0]; 1 - x_пр[0]] if Dt == 1
    [1 - x_пр[1]; x_пр[1]] if Dt == 2
    = [0.99; 0.01]
# Вторичный поток (доля расхода наименьшая)
# Доля потока:
R := 1 - D = 0.2
# Тип потока:
Rt :=
    1 if Dt == 2
    2 if Dt == 1
    = 2
Ft(Rt) = "Высококипящий"
# Фазовый состав:
# [component: outputs Rf]
# Концентрации:
X_R :=
    [x_пр[0]; 1 - x_пр[0]] if Rt == 1
    [1 - x_пр[1]; x_пр[1]] if Rt == 2
    = [0.05; 0.95]
# Сделаем подстановки:
# Общие:
i_1(T_1, p_2) := h_Tpz(T_1, p_2, x_см)
i_2 := h_M
# Для потока D:
i_5'(T_1) := h_Tpz(T_1, p_раб, X_D)
i_4 :=
    h_Tdx(T_s_px(p_раб, X_D), ρ_s_px(p_раб, X_D), X_D) if Df == 1
    h_Tdx(T_s_py(p_раб, X_D), ρ_s_py(p_раб, X_D), X_D) if Df == 2
C_p_(T_1, ΔT) := 0.5*(C_p_Tpz(T_1, p_раб, X_D) + C_p_Tpz(T_1 - ΔT, p_раб, X_D))
# Для потока R (переход к Cp не производится):
i_7(T_7, X_R) := h_Tpz(T_7, p_раб, X_R)
i_6 :=
    h_Tdx(T_s_px(p_раб, X_R), ρ_s_px(p_раб, X_R), X_R) if Rf == 1
    h_Tdx(T_s_py(p_раб, X_R), ρ_s_py(p_раб, X_R), X_R) if Rf == 2
# Представим и решим уравнение в виде:
T_7 := 250 K
Given
i_7(T_7, X_R) == 1/R*(i_1(T_1, p_2) - i_2 + D*(i_4 - i_5'(T_1) + C_p_(T_1, ΔT_1s)*ΔT_1s)) + i_6
T_7(p_2, T_1, ΔT_1s) := Find(T_7)
p_2 := 100, 100 + 5 .. 250
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C_p_(T_1, ΔT, X_P) := 0.5*(C_p_Tpz(T_1, p_раб, X_P) + C_p_Tpz(T_1 - ΔT, p_раб, X_P))
i_7'(T_1) := h_Tpz(T_1, p_раб, X_R)
Given
T_1 := 200 K
i_1(T_1, p_2) == D*(i_5'(T_1) - C_p_(T_1, ΔT_1s, X_D)*ΔT_1s - i_4) + (R*(i_7'(T_1) - C_p_(T_1, ΔT_2s, X_R)*ΔT_2s - i_6) + i_2)
T_1(p_2, ΔT_1s, ΔT_2s) := Find(T_1)
p_2 := 10, 10 + 20 .. 300
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# К содержанию...
# 5.2. Метод Мак-Кеба и Тиле
# Заготовка диаграммы для построения тарелок
# Пропорции горизонтальные:
Y_проп_г := [X_M; X_M]
X_проп_г := [X_M; X_M - y_п*0.15]
# Пропорции вертикальные:
X_проп_в := [X_M; X_M]
Y_проп_в := [X_M; X_M + x_ж*0.15]
# Уравнение линии для нахождения рабочей точки:
# Функция line() находится здесь...
kb_M := line(X_M, X_M, X_M - y_п, X_M + x_ж)  # error: Эта функция допускает не более 2 аргументов, но применяется она к 4.
y_тM(xx) := kb_M[0]*xx + kb_M[1]
# Точка пересечения этой линии и линии равновесных состояний:
xxx := 0.5
Given
y(xxx) == y_тM(xxx)
X_M' := Find(xxx)
X_M' =  # error: Эта переменная не определена.
Y_M' := y(X_M')
xx := 0, 0.001 .. 1
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# 5.2.1. Продукт - высококипящий компонент | К содержанию...
# Расчет можно проводит в друх направлениях. 1 - задаться рабочим флегмовым отношением, затем рассчитать коэффициент запаза; 2 - рассчитать его через коэффициент запаса и минимальное значение. В данном случае будет рассмотрен первый вариант, но адаптировать расчет под 2 вариант достаточно просто.
# Флегмовое отношение рабочее:
f_раб_исч := f'_раб
# Уравнение рабочей линии исчерпывающей секции:
b_к_исч := X_R - f_раб_исч*X_R
