# 1.  Подключение файла с описанием функций расчёта свойств, как внешней ссылки
# (Меню Insert -> Reference...)
# [reference: rfp2mcd(c) Release [mcd14].xmcd]
# 2.  Инициализация расчётного модуля
# Ввод числа компонентов смеси
# (1 при использовании чистого вещества)
i := 2
# Ввод имён файлов описания свойств используемых веществ
# (имена файлов указываются
# вместе с полным путём их расположения на диске и
# разделяются, в случае использования
# более чем одного вещества, знаком "|")
hfld1 := "C:\Rfp8\fluids\NITROGEN.FLD|"
hfld2 := "C:\Rfp8\fluids\OXYGEN.FLD|"
hfld := concat(hfld1, hfld2)
# Возможные компоненты: | NITROGEN.FLD
# OXYGEN.FLD
# ARGON.FLD
# Задавать в порядке возрастания нормальной температуры кипения!
# Собственно инициализация
# (функция возвращает 0, в случае успешного выполнения)
ierr_SETUP(i, hfld, hfm, hrf) = 0
# Состав рабочей смеси
# Чистые низкокипящий и высококипящий компоненты
x_н := [1; 0]
x_в := [0; 1]
# Состав исходной смеси:
x_см := [0.89; 0.21]
# Рабочее давление:
p_см := 3*бар
# Диаграмма h-x
# 1. Линия кипения
h_кип0(x) := h_Tpz(T_s_px(p_см, [x; 1 - x]), p_см, [x; 1 - x])*μ_x([x; 1 - x])/(Дж/моль)
# 2. Линия конденсации
h_конд0(x) := h_Tpz(T_s_py(p_см, [x; 1 - x]), p_см, [x; 1 - x])*μ_x([x; 1 - x])/(Дж/моль)
# 3.Уравнение изотермы
h_Tconst(T, x) := h_Tpz(T*K, p_см, [x; 1 - x])*μ_x([x; 1 - x])/(Дж/моль)
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# 4. Если необходимо выполнять дополнительные построения на диаграммы, то для повышения скорости расчета рекомендуется провести интерполяцию кривых и работать уже с полученными функциями.
# Пример:
# 5. Определяем интервал, на котором необходимо проводить расчеты:
x := 0, 0.05 .. 1
# 6. Выводим значения функций:
h_конд0(x) = [2793.46; 2779.32; 2764.72; 2749.63; 2734.02; 2717.86; 2701.1; 2683.69; 2665.58; 2646.7; 2626.97; 2606.31; 2584.63; 2561.8; 2537.69; 2512.14; 2484.93; 2455.78; 2424.33; 2390.02; 2351.98]
h_кип0(x) = [2793.46; -3601.24; -3582.76; -3558.49; -3529.5; -3496.64; -3460.63; -3422.03; -3381.3; -3338.79; -3294.81; -3249.55; -3203.2; -3155.88; -3107.68; -3058.64; -3008.82; -2958.2; -2906.78; -2854.54; 2351.98]
# 7. Выделяем полученные данные и создаем новый столбец:
Y_конд := [2793.46; 2779.32; 2764.72; 2749.63; 2734.02; 2717.86; 2701.1; 2683.69; 2665.58; 2646.7; 2626.97; 2606.31; 2584.63; 2561.8; 2537.69; 2512.14; 2484.93; 2455.78; 2424.33; 2390.02; 2351.98]
Y_кип := [2793.46; -3601.24; -3582.76; -3558.49; -3529.5; -3496.64; -3460.63; -3422.03; -3381.3; -3338.79; -3294.81; -3249.55; -3203.2; -3155.88; -3107.68; -3058.64; -3008.82; -2958.2; -2906.78; -2854.54; 2351.98]
X := [0; 0.05; 0.1; 0.15; 0.2; 0.25; 0.3; 0.35; 0.4; 0.45; 0.5; 0.55; 0.6; 0.65; 0.7; 0.75; 0.8; 0.85; 0.9; 0.95; 1]
# 8. После этого можно выключить вычисления для заданных выше функций и графика. Проводим интерполяцию:
# Для кривой конденсации: | Для кривой кипения:
h_конд := cspline(X, Y_конд)
h_кип := cspline(X, Y_кип)
h_конд(x) := interp(h_конд, X, Y_конд, x)
h_кип(x) := interp(h_кип, X, Y_кип, x)
# 9. Работаем с полученными функциями:
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# 10. В центральной части графика величина шага в установленном интервале достаточна, но по границам возникла большая погрешность. Необходимо провести корректировку заданного интервала для апроксимации:
Y_конд :=
    A[0] ← 0
    ind ← 1
    for i ∈ 0 .. 99
        if i ≤ 10 or 90 ≤ i ≤ 100
            for j ∈ 1 .. 99
                A ← stack(A, h_конд0(0.01*i + 0.0001*j))
            ind ← ind + 1
        otherwise
            A ← stack(A, h_конд0(0.01*i))
            ind ← ind + 1
    A
Y_кип :=
    A[0] ← 0
    ind ← 1
    for i ∈ 0 .. 99
        if i ≤ 10 or 90 ≤ i ≤ 100
            for j ∈ 1 .. 99
                A ← stack(A, h_кип0(0.01*i + 0.0001*j))
            ind ← ind + 1
        otherwise
            A ← stack(A, h_кип0(0.01*i))
            ind ← ind + 1
    A
X :=
    A[0] ← 0
    ind ← 1
    for i ∈ 0 .. 99
        if i ≤ 10 or 90 ≤ i ≤ 100
            for j ∈ 1 .. 99
                A ← stack(A, 0.01*i + 0.0001*j)
            ind ← ind + 1
        otherwise
            A ← stack(A, 0.01*i)
            ind ← ind + 1
    A
# Повторяем действия 6, 7 и 8
Y_конд =  # no stored result
Y_кип =  # no stored result
# Для кривой конденсации: | Для кривой кипения:
h_конд := cspline(X, Y_конд)
h_кип := cspline(X, Y_кип)
h_конд(x) := interp(h_конд, X, Y_конд, x)
h_кип(x) := interp(h_кип, X, Y_кип, x)
x := 0, 0.001 .. 1
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