# 1.  Подключение файла с описанием функций расчёта свойств, как внешней ссылки
# (Меню Insert -> Reference...)
# [reference: rfp2mcd(c) Release [mcd14].xmcd]
# 2.  Инициализация расчётного модуля
# Ввод числа компонентов смеси
# (1 при использовании чистого вещества)
i := 2
# Ввод имён файлов описания свойств используемых веществ
# (имена файлов указываются
# вместе с полным путём их расположения на диске и
# разделяются, в случае использования
# более чем одного вещества, знаком "|")
hfld1 := "C:\Rfp8\fluids\NITROGEN.FLD|"
hfld2 := "C:\Rfp8\fluids\OXYGEN.FLD|"
hfld := concat(hfld1, hfld2)
# Возможные компоненты: | NITROGEN.FLD
# OXYGEN.FLD
# ARGON.FLD
# Задавать в порядке возрастания нормальной температуры кипения!
# Собственно инициализация
# (функция возвращает 0, в случае успешного выполнения)
ierr_SETUP(i, hfld, hfm, hrf) = 0
# Состав рабочей смеси
# Чистые низкокипящий и высококипящий компоненты
x_н := [1; 0]
x_в := [0; 1]
# Состав исходной смеси:
x_см := [0.89; 0.21]
# Рабочее давление:
p_см := 3*бар
# Диаграмма y-x
# Уравнение, для нахождения изотермы:
x := 0.2
Given
T_s_py(p_см, [x; 1 - x]) == TT
T_кип_н(TT) := Find(x)
# Доля низкокипящего компонента в паре:
yyy(xx) :=
    T ← T_s_px(p_см, [xx; 1 - xx])
    y ← T_кип_н(T)
    y
z := 0, 0.05 .. 1
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