# 1.  Подключение файла с описанием функций расчёта свойств, как внешней ссылки
# (Меню Insert -> Reference...)
# [reference: rfp2mcd(c) Release [mcd14].xmcd]
# 2.  Инициализация расчётного модуля
# Ввод числа компонентов смеси
# (1 при использовании чистого вещества)
i := 1
# Ввод имён файлов описания свойств используемых веществ
# (имена файлов указываются
# вместе с полным путём их расположения на диске и
# разделяются, в случае использования
# более чем одного вещества, знаком "|")
hfld := "C:\Rfp8\fluids\R22.FLD"
# Собственно инициализация
# (функция возвращает 0, в случае успешного выполнения)
ierr_SETUP(i, hfld, hfm, hrf) = 0
# При замене рабочего вещества для пересчёта значений всех использованных на листе функций рекомендуется использовать либо перезагрузку файла расчёта, либо его полный пересчёт
# Меню Tools -> Calculate -> Calculate Worksheet (сочетание клавиш Ctrl+F9).
# Состав рабочей смеси
# (массив из одной строки и одного столбца
# с 1 в качестве значения для чистого вещества)
x := [1]
# Алгоритм расчёта в примере не подразумевает использование смесевого рабочего тела, ограничивается только чистыми и моновеществами.
# Техническое задание
# Определить следующие удельные величины:
# - работу цикла,
# - теплоту конденсации,
# - полезную холодопроизводительность,
# - холодильный коэффициент
# - степень термодинамического совершенства.
# Исходные данные для расчета:
# Изоэнтропный  КПД компрессора
η_t := 0.7
# Температура кипения
t_0 := 5 °C
t_0 = 278.15 K
# Перегрев:
ΔT_г := 0*K
# Температура конденсации
t_к := 60 °C
t_к = 333.15 K
# Переохлаждение:
ΔT_х := 0*K
# Расчет парокомпрессионного цикла
# Критическая температура для рабочего тела
T_c_i(1) = 369.295 K
p_0 := p_s_Tx(t_0, x)
p_k := p_s_Tx(t_к, x)
# Давление кипения по известной температуре:
p_k = 24.2749 бар
# Давление конденсации по известной температуре:
p_0 = 5.84109 бар
# Отношение давления:
π_k := p_k/p_0 = 4.15588
# Определение параметров в ключевых точках цикла:
# Параметры в точке 1 (выход из испрителя):
# Давление:
p_1 := p_0 = 5.84109 бар
# Температура:
t_1 := t_0 = 5 °C
ρ_1 := ρ_Tpx_v(t_1, p_1, x)
i_1 := h_Tdx(t_1, ρ_1, x)
s_1 := s_Tdx(t_1, ρ_1, x)
# Плотность:
ρ_1 = 24.7922 кг/м^3
# Энтальпия:
i_1 = 406.849 кДж/кг
# Энтропия:
s_1 = 1.74361 кДж/(кг*K)
# Параметры в точке 1' (после перегрева):
# Давление:
p_1_0 := p_0 = 5.84109 бар
# Температура:
t_1_0 := t_0 = 5 °C
ρ_1_0 := ρ_Tpx_v(t_1, p_1, x)
i_1_0 := h_Tdx(t_1, ρ_1, x)
s_1_0 := s_Tdx(t_1, ρ_1, x)
# Плотность:
ρ_1_0 = 24.7922 кг/м^3
# Энтальпия:
i_1_0 = 406.849 кДж/кг
# Энтропия:
s_1_0 = 1.74361 кДж/(кг*K)
# Параметры в точке 2 (выход после изизоэнтропного компрессора):
# Давление:
p_2 := p_k = 24.2749 бар
# Энтропия:
s_2 := s_1 = 1.74361 кДж/(кг*K)
t_2 := T_psz(p_2, s_2, x)
i_2 := h_psz(p_2, s_2, x)
ρ_2 := ρ_Tpx_v(t_2, p_2, x)
# Плотность:
ρ_2 = 91.9008 кг/м^3  # Энтальпия:
i_2 = 442.71 кДж/кг  # Температура:
t_2 = 355.928 K
# Параметры в точке 2' (снятие темплоты сжатия):
# Давление:
p_2_0 := p_k = 24.2749 бар
# Температура:
t_2_0 := t_к = 60 °C
ρ_2_0 := ρ_Tpx_v(t_2_0, p_2_0, x)
i_2_0 := h_Tdx(t_2_0, ρ_2_0, x)
s_2_0 := s_Tdx(t_2_0, ρ_2_0, x)
# Плотность:
ρ_2_0 = 111.591 кг/м^3
# Энтальпия:
i_2_0 = 417.549 кДж/кг  # Энтропия:
s_2_0 = 1.67046 кДж/(кг*K)
# Параметры в точке 3' (выход из конденсатора):
# Давление:
p_3_0 := p_k = 24.2749 бар
# Температура:
t_3_0 := t_к = 60 °C
ρ_3_0 := ρ_Tpx_l(t_3_0, p_3_0, x)
i_3_0 := h_Tdx(t_3_0, ρ_3_0, x)
s_3_0 := s_Tdx(t_3_0, ρ_3_0, x)
# Плотность:
ρ_3_0 = 1030.38 кг/м^3
# Энтальпия:
i_3_0 = 277.613 кДж/кг
# Энтропия:
s_3_0 = 1.25041 кДж/(кг*K)
# Параметры в точке 3 (после переохлаждения):
# Давление:
p_3 := p_k = 24.2749 бар
# Температура:
t_3 := t_к = 60 °C
ρ_3 := ρ_Tpx_l(t_3, p_3, x)
i_3 := h_Tdx(t_3, ρ_3, x)
s_3 := s_Tdx(t_3, ρ_3, x)
# Плотность:
ρ_3 = 1030.38 кг/м^3
# Энтальпия:
i_3 = 277.613 кДж/кг
# Энтропия:
s_3 = 1.25041 кДж/(кг*K)
# Параметры в точке 4 (после дросселя):
# Давление:
p_4 := p_0 = 5.84109 бар
# Энтальпия:
i_4 := i_3 = 277.613 кДж/кг
s_4 := s_phz(p_4, i_4, x)
# Температура:
t_4 := t_0 = 5 °C
# Энтропия:
s_4 = 1.27898 кДж/(кг*K)
# Работа изоэнтропного сжатия:
l_сж_h := i_2 - i_1_0 = 35.8609 кДж/кг
# Работа изотермического сжатия:
l_сж_T := R_i(1)*t_1_0*ln(π_k) = 38.1005 кДж/кг
# Работа сжатия:
l_сж := 1/η_t*R_i(1)*t_1_0*ln(π_k) = 54.4292 кДж/кг
# Удельная тепловая нагрузка на конденсатор:
q_k := (i_2 - i_2_0) + (i_2_0 - i_3_0) = 165.098 кДж/кг
# Удельная тепловая нагрузка на испратиль:
q_0 := i_1 - i_4 = 129.237 кДж/кг
# Холодильный коэффициент:
ε := q_0/l_сж = 2.3744
# Холодильный коэффициент Сати Карно:
ε_К := t_0/(t_к - t_0) = 5.05727
# Степень термодинамического совершенства:
η_t := ε/ε_К = 0.469502
# Поостроение цикла на базовых диаграммах состояния
# 1. Изображение на lg(p)-i диаграмме
# 1.1  Формирование массивов ключевых точек цикла
h_cycle_gr := stack(i_1, i_1_0, i_2, i_2_0, i_3_0, i_3, i_4, i_1)/(кДж/кг)
transpose(h_cycle_gr) = [406.849, 406.849, 442.71, 417.549, 277.613, 277.613, 277.613, 406.849]
p_cycle_gr := stack(p_1, p_1_0, p_2, p_2_0, p_3_0, p_3, p_4, p_1)/бар
transpose(p_cycle_gr) = [5.84109, 5.84109, 24.2749, 24.2749, 24.2749, 24.2749, 5.84109, 5.84109]
# 1.2  Формирование массивов для изображения пограничных кривых на диаграмме
# Количество опорных точек
N_pts := 50
# Инициализация счётчика
ORIGIN = 0
j := ORIGIN .. ORIGIN + N_pts
# Температура тройной точки
T_tp_i(1) = -157.42 °C
# Минимальное значение изображаемой температуры
T_min := -15 °C
T_min_gr := T_min/K
# Минимальное значение изображаемого давления
p_min := p_s_Tx(T_min, x) = 296197 Па
p_min_gr := (Round(min(p_cycle_gr), 1) - 0.5)*бар = 5.5 бар
# Максимальное значение изображаемого давления
p_max := p_c_i(1) = 49.9 бар
p_max_gr := (Round(max(p_cycle_gr), 5) + 5)*бар = 30 бар
# Плотности паровой и жидкой фаз
# при минимальном давлении
ρ_min := ρ_Tpx_v(T_min, p_min, x) = 12.9009 кг/м^3
ρ_max := ρ_Tpx_l(T_min, p_min, x) = 1330.78 кг/м^3
# Предельные значения
# диапазона изображаемых энтальпий
h_min := h_Tdx(T_min, ρ_max, x) = 182.697 кДж/кг
h_min_gr := (Round(min(h_cycle_gr), 10) - 50)*кДж/кг = 230 кДж/кг
h_max := 1.5*h_Tdx(T_min, ρ_min, x) = 598.744 кДж/кг
h_max_gr := (Round(max(h_cycle_gr), 10) + 50)*кДж/кг = 490 кДж/кг
# Формирование массива изображаемых значений давления
p_rng[j] := (p_min + j/(ORIGIN + N_pts)*(p_max - p_min))
p_gr := p_rng/бар
transpose(p_rng) = [
    2.96197, 3.90073, 4.83949, 5.77825, 6.71701, 7.65577, 8.59453, 9.53329, 10.4721, 11.4108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] бар
# Формирование массивово изображаемых значений энтальпии левой и правой пограничных кривых
# Формирование массива температур насыщения по известным значениям давления
T_rng[j] := T_s_px(p_rng[j], x)
T_gr := T_rng/K
transpose(T_rng) = [
    258.15, 265.864, 272.274, 277.805, 282.696, 287.101, 291.119, 294.824, 298.267, 301.488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] K
# Определение плотностей паровой и жидкой фаз при известных условиях насыщения
ρ_v_rng[j] := ρ_Tpx_v(T_rng[j], p_rng[j], x)
transpose(ρ_v_rng) = [
    12.9009, 16.7777, 20.6498, 24.5318, 28.4338, 32.3634, 36.3267, 40.3289, 44.3747, 48.4685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] кг/м^3
ρ_l_rng[j] := ρ_Tpx_l(T_rng[j], p_rng[j], x)
transpose(ρ_l_rng) = [
    1330.78, 1305.85, 1284.48, 1265.52, 1248.31, 1232.41, 1217.55, 1203.53, 1190.2, 1177.44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] кг/м^3
# Определение энтальпий на левой и правой пограничных кривых
h_l_rng[j] := h_Tdx(T_rng[j], ρ_l_rng[j], x)
h_l_gr := h_l_rng/(кДж/кг)
transpose(h_l_rng) = [
    182.697, 191.527, 198.974, 205.488, 211.324, 216.644, 221.554, 226.133, 230.436, 234.506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] кДж/кг
h_v_rng[j] := h_Tdx(T_rng[j], ρ_v_rng[j], x)
h_v_gr := h_v_rng/(кДж/кг)
transpose(h_v_rng) = [
    399.163, 402.273, 404.723, 406.728, 408.407, 409.836, 411.066, 412.132, 413.059, 413.868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] кДж/кг
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# 2. Изображение на T-s диаграмме
# 1.1  Формирование массивов ключевых точек цикла
T_cycle_gr := stack(t_1, t_1_0, t_2, t_2_0, t_3_0, t_3, t_4, t_1)/K
transpose(T_cycle_gr) = [278.15, 278.15, 355.928, 333.15, 333.15, 333.15, 278.15, 278.15]
s_cycle_gr := stack(s_1, s_1_0, s_2, s_2_0, s_3_0, s_3, s_4, s_1)/(кДж/(кг*K))
transpose(s_cycle_gr) = [1.74361, 1.74361, 1.74361, 1.67046, 1.25041, 1.25041, 1.27898, 1.74361]
# 1.2  Формирование массивов для изображения пограничных кривых на диаграмме
# Максимальное значение изображаемой температуры
T_max := trunc(T_c_i(1)/K) + 1 = 370
T_max_gr := T_max
# Предельные значения
# диапазона изображаемых энтальпий
s_min := s_Tdx(T_min, ρ_max, x) = 0.935439 кДж/(кг*K)
s_min_gr := s_min/(кДж/(кг*K)) = 0.935439
s_max := s_Tdx(T_min, ρ_min, x) = 1.77397 кДж/(кг*K)
s_max_gr := 2 = 2
# Определение энтропий на левой и правой пограничных кривых
s_l_rng[j] := s_Tdx(T_rng[j], ρ_l_rng[j], x)
s_l_gr := s_l_rng/(кДж/(кг*K))
transpose(s_l_rng) = [
    0.935439, 0.96887, 0.996279, 1.01969, 1.04025, 1.05866, 1.07538, 1.09074, 1.10499, 1.1183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] кДж/(кг*K)
s_v_rng[j] := s_Tdx(T_rng[j], ρ_v_rng[j], x)
s_v_gr := s_v_rng/(кДж/(кг*K))
transpose(s_v_rng) = [
    1.77397, 1.76155, 1.75195, 1.74409, 1.73741, 1.73157, 1.72635, 1.72162, 1.71727, 1.71322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] кДж/(кг*K)
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